Simulations: Version=156
  DataStore
  Memo Stock Model Examples
    #Stock Model Example Simulations

    Contributors:

    * Neville Herrman (CSIRO)
    * Dean Holzworth (CSIRO)
    * Di Mayberry (CSIRO)
    * Mark Liefferring (AgResearch
    * Val Snow (AgResearch)

    Funding Acknowledgements:

    * CSIRO ???? fund
    * AgResearch Strategic Science Investment Fund
    * APSIM Initiative Development Fund

    This simulation file contains examples of how to use Stock is a variety of settings. Each simulation has a variety of Managers that are explained in this PDF and/or as in-text comments in the Manager scripts. The intention is that they can form starting points for new simulations and as such may not make much practical sense.
    Included are:

    *  Agistment grazing of a forage crop with supplements offered
    *  A simple rotation of stock around five paddocks
    *  Feedlot sheep tactically grazing a wheat crop
  Folder Trial Scripts
    Manager Buy
      Buying = False
      Enterprise = entWether
      Genotype = Angus
      StockingRate = 5
      CondScore = 0
      Sex = Female
      Pregnant = 0
      Lactating = 0
      Age = 12
      Weight = 100
      NumStock = 0
      BuyPolicy = Date
      BuyDate =
      FlexibleExpressionForBuying =
```csharp
using Models.PMF.Interfaces;
using System.Diagnostics;
using Models.AgPasture;
using System.Linq;
using System.Collections.Generic;
using System.Collections;
using Models.Soils;
using Models.PMF;
using System.Xml.Serialization;
using APSIM.Shared.Utilities;
using Models.GrazPlan;
using Models.Utilities;
using Models.Functions;
using Models.Core;
using Models;
using System;

namespace Models
{

    [Serializable]
    public class Script : Model
    {
        [Link] Clock clock;
        [Link] Stock stock;
        [Link] Supplement supplement;
        [Link] List<Zone> paddocks;
        [Link] ISummary summary;
        [Link] Simulation farm;
        [Link] List<IPlantDamage> forages = null;

        private int CurrentGroupNum = 1;    // animal group number
        private int CurrentLocationNum { get; set; }
   	  private IBooleanFunction expressionFunction;
     
             public enum BuyPolicyType
        {
            Date,
            Other
        }
        
                public enum StockEnterprise
        {
            /// <summary>
            /// Wether
            /// </summary>
            entWether,
            /// <summary>
            /// Ewes and wethers
            /// </summary>
            entEweWether,
            /// <summary>
            /// Steers
            /// </summary>
            entSteer,
            /// <summary>
            /// Beef cow breeding
            /// </summary>
            entBeefCow,
            /// <summary>
            /// Trading lambs
            /// </summary>
            entLamb
        }


        [Description("Buy animals?")]
        public bool Buying { get; set; }
        
        [Description("Enterprise")] 
        [Display(EnabledCallback = "BuyingEnabled")]
        public StockEnterprise Enterprise { get; set; }
        
 //       [Description ("Animal Type")]
  //      public AnimalType Type {get; set;} 
        
           [Description("Stock: genotype (e.g. Small Merino, Angus, Friesian):")] 
        [Display(Values="GetGenotypes")]
        public string Genotype { get; set; } 
  
        [Description("Whole-farm stocking rate (head/ha): ")] 
        public double StockingRate { get; set; } 
        
        [Description("Condition Score")]
        public double CondScore {get; set; }
        
        [Description("Stock: sex (Female, Male, Castrate):")] 
        public ReproductiveType Sex { get; set; }
        
        [Description("Stock: fertility status (0 if non-pregnant or days since conception):")] 
        public int Pregnant { get; set; }

        [Description("Stock: lactation status (0 if non-lactating or days since parturition):")]
        public int Lactating { get; set; }
        
        [Description("Stock: age (months):")] 
        public double Age { get; set; }

        [Description("Stock: weight (kg liveweight /head):")] 
        public double Weight { get; set; }
        
        [Description("Number of animals to buy: ")] 
        public int NumStock { get; set; }
        
        [Description("Buying policy ")] 
        [Display(EnabledCallback = "BuyingEnabled")]
        public BuyPolicyType BuyPolicy { get; set; }
   
          public bool BuyingEnabled { get { return Buying; } }
          
           public bool BuyingOtherEnabled
        { 
            get
            { 
                return Buying &&
                (BuyPolicy == BuyPolicyType.Other);
            } 
        }
        
        public bool BuyingDateEnabled
        {
        	get
        	{
        		return Buying &&
        		(BuyPolicy==BuyPolicyType.Date);
        	}
        }
             
        [Separator("Buy on a date")]
        [Description("Date to buy animals (dd-mmm)")] 
               [Display(EnabledCallback = "BuyingDateEnabled")]
        public string BuyDate { get; set; }
        
        
        
        [Separator("Settings for flexible buying")]
        [Description("Expression for flexible buying criteria (e.g. AGPRyegrass.CoverTotal > 0.95)")]
       [Display(EnabledCallback = "BuyingOtherEnabled")]
        public string FlexibleExpressionForBuying { get; set; }


   //    public string[] GetAnimals()
     //   {
 	   // 	if (stock!= null)
        //		return GrazType.AnimalType
       //	return null;
        //}

        // Return a list of genotypes to the properties tab. filter by animal type
        public string[] GetGenotypes()
        {
            if (stock != null)
                return stock.Genotypes.Names.ToArray();
            return null;
        }
        

		
        [EventSubscribe("DoManagement")]
        private void OnDoManagement(object sender, EventArgs e)
        {

			if (DateUtilities.WithinDates(BuyDate, clock.Today, BuyDate))
        {

            //Debugger.Break();

            summary.WriteMessage(this, "Initialising the paddock information", MessageType.Diagnostic);

            NumStock = (int)(Math.Round(StockingRate * farm.Area, 0));

            BuyStock();
            summary.WriteMessage(this, "     Number of stock bought is " + NumStock, MessageType.Diagnostic);
            summary.WriteMessage(this, "     The number of animals has been rounded to " + NumStock + " from " + (StockingRate * farm.Area), MessageType.Diagnostic);
            summary.WriteMessage(this, "     The area of the whole farm is " + farm.Area + " ha", MessageType.Diagnostic);

        }
        }

        public void BuyStock()
        {
            CurrentGroupNum = stock.NoGroups + 1;
            StockBuy purchase = new StockBuy();
            purchase.Genotype = Genotype;
            purchase.Number = NumStock;
            purchase.Sex = Sex;
            purchase.Age = Age;       // age in months
            purchase.Weight = Weight;  // live weight in kg
            purchase.UseTag = CurrentGroupNum + 1;
            purchase.MatedTo = purchase.Genotype;
            purchase.Pregnant = Pregnant;  // days pregnant, 0 = non pregnant, 1 = pregnant
            purchase.Lactating = Lactating;  // 0 for dry, 1 for lactating

            stock.Buy(purchase);
        }


    }
}
```
    Manager Sell
      Selling = True
      SaleFirstDate =
      SaleLastDate =
      SellPolicy = SellYoung
      SalePercentAnimals = 0
      SaleAge = 0
      SaleWeight = 0
      FlexibleExpressionForBuying =
```csharp
/*-------------------------------------------------------------------------------------
Sheep grazing wheat when conditions are suitable, and in feedlot the rest of the time.
---------------------------------------------------------------------------------------

In this script animals are bought and sold within a specified date window.
They are fed supplement in a feedlot at a set rate, but graze a wheat crop when a criteria is met.
Animals are moved from the wheat crop and back to feedlot when a second criteria is met.

Based on Sprague SJ, Kirkegaard JA, Dove H, Graham JM, McDonald SE, Kelman WM (2015) Integrating dual-purpose wheat and canola into high-rainfall livestock systems in south-eastern Australia. 1. Crop forage and grain yield. Crop and Pasture Science 66(4), 365-376. 

Activities in this manager:
1. Buy animals at start of year & put in feedlot
2. Move animals from feedlot to crop when ready to graze
3. Move animals from crop to feedlot 
4. Shear all animals on specified date
5. Sell all animals at end of year

NOTES
1. When the animals are in the feedlot and an animal dies during the day, the supplement has already been fed into the feedlot
   based on the number of animals in the feedlot at the start of the day. This means the remaining animals have access to slightly
   more supplement and causes a spike in supp intake graph
2. When sheep are culled for age + purchased to maintain stocking rate, several groups of sheep are created.
   This causes irregular amounts of supplement to be fed.
--------------------------------------------------------------------------------------*/


using System.Linq;
using System;
using System.Collections.Generic;
using Models.Core;
using Models.PMF;
using Models.Functions;
using Models.Soils;
using Models.Utilities;
using Models.GrazPlan;
using APSIM.Shared.Utilities;
using System.Diagnostics;

namespace Models
{
    [Serializable]
    [Description(
        "<p><b>Animals grazing a crop when conditions are suitable, and in feedlot the rest of the time.</b></p>" +
        "In this script animals are bought and sold within a specified date window. " +
        "They are fed supplement in a feedlot at a set rate, but graze a wheat crop when a criteria is met. " +
        "Animals are moved from the wheat crop and back to feedlot when a second criteria is met.")]    
    public class Script : Model
    {
        [Link] Clock clock;
        [Link] Stock Animals;
        [Link] Supplement Feed;
        [Link] Summary Summary;
        [Link] IPlant plant;
        [Link] Soil Soil;
        [Link] Zone Paddock;
        [Link] ScriptCompiler compiler;

        private IBooleanFunction expressionFunction;

        public enum SellPolicyType
        {
            Date,
            CulledForAge,
            CulledForWeight,
            SellYoung,
            Other
        }

  
        ////////////////////////////////////////////////////////
        [Separator("Selling of animals")]

        [Description("Selling animals?")] 
        public bool Selling { get; set; }

        [Description("First date to consider selling animals (dd-mmm)")] 
        public string SaleFirstDate { get; set; }

        [Description("Last date to consider selling animals (dd-mmm)")] 
        public string SaleLastDate { get; set; }

        [Description("Selling policy ")] 
        [Display(EnabledCallback = "SellingEnabled")]
        public SellPolicyType SellPolicy { get; set; }
 
        [Description("Percentage of animals to sell (%)")] 
        [Display(EnabledCallback = "SellingEnabled")]
        public double SalePercentAnimals { get; set; }

        [Description("Age at which to sell (months): ")] 
        [Display(EnabledCallback = "SellingAgeEnabled")]
        public int SaleAge { get; set; }

        [Description("Weight at which to sell (kg): ")] 
        [Display(EnabledCallback = "SellingWeightEnabled")]
        public double SaleWeight { get; set; }

       [Separator("Settings for flexible selling")]
        [Description("Expression for flexible selling criteria (e.g. AGPRyegrass.CoverTotal > 0.95)")]
        [Display(EnabledCallback = "SellingOtherEnabled")]
        public string FlexibleExpressionForBuying { get; set; }


        ////////////////////////////////////////////////////////////////////////////
        // Callback properties to control disabling of properties.
        ////////////////////////////////////////////////////////////////////////////

        public bool SellingEnabled { get { return Selling; } }

        public bool SellingAgeEnabled
        { 
            get
            { 
                return Selling &&
                (SellPolicy == SellPolicyType.CulledForAge);
            } 
        }

        public bool SellingWeightEnabled
        { 
            get
            { 
                return Selling &&
                (SellPolicy == SellPolicyType.CulledForWeight);
            } 
        }
        
        public bool SellingOtherEnabled
        { 
            get
            { 
                return Selling &&
                (SellPolicy == SellPolicyType.Other);
            } 
        }
        

        ////////////////////////////////////////////////////////////////////////////
        // Outputs
        ////////////////////////////////////////////////////////////////////////////
        // <summary>Number of animals sold.</summary>
        public int NumberSold { get; set; }

        // <summary>Description of something that has happened.</summary>
        public string EventName { get; set; }

        // <summary>Return a list of genotypes to the properties tab.</summary>
        public string[] GetGenotypes()
        {
            if (Animals != null)
                return Animals.Genotypes.Names.ToArray();
            return null;
        }

        public string CurrentLocation { get; set; }  // location of the sheep
  



        // ============================================================
        // Management that happens every day.
        // ============================================================
        [EventSubscribe("DoManagement")]
        private void OnDoManagement(object sender, EventArgs e)
        {
            EventName = string.Empty;

            // Sell animals
            // Sell animals
            if (SellingEnabled && DateUtilities.WithinDates(SaleFirstDate, clock.Today, SaleLastDate))
                {
                    IEnumerable<AnimalGroup> AnimalsToSell = null;
                    if (SellPolicy == SellPolicyType.CulledForAge)
                      {  // split older animals into a new group
                        AnimalsToSell = Animals.SplitByAge(Convert.ToInt32(SaleAge * 30)); // months to days
                        }
                    else if (SellPolicy == SellPolicyType.CulledForWeight)
                        {// split heavier animals into a new group
                        AnimalsToSell = Animals.SplitByWeight(SaleWeight);
                        }
                    else if (SellPolicy == SellPolicyType.SellYoung)
                        {// split young (offspring) into new groups
                        AnimalsToSell = Animals.SplitByYoung();
                        }
                      if (AnimalsToSell != null)
                    {
                        var numberSellableAnimals = AnimalsToSell.Sum(g => g.NoAnimals);
                        var numberAnimalsToSell = Convert.ToInt32(numberSellableAnimals * SalePercentAnimals / 100.0);
                        if (numberAnimalsToSell > 0)
                            Animals.Sell(numberAnimalsToSell, AnimalsToSell);
                            EventName = numberAnimalsToSell + " animals sold";
                    }

                    }                                 
                }
            }
 }
```
    Manager Shear
      ShearDate =
```csharp
using System.Linq;
using System;
using System.Collections.Generic;
using Models.Core;
using Models.PMF;
using Models.Functions;
using Models.Soils;
using Models.Utilities;
using Models.GrazPlan;
using APSIM.Shared.Utilities;
using System.Diagnostics;

namespace Models
{
    [Serializable]
    [Description(
        "<p><b>Animals grazing a crop when conditions are suitable, and in feedlot the rest of the time.</b></p>" +
        "In this script animals are bought and sold within a specified date window. " +
        "They are fed supplement in a feedlot at a set rate, but graze a wheat crop when a criteria is met. " +
        "Animals are moved from the wheat crop and back to feedlot when a second criteria is met.")]    
    public class Script : Model
    {
        [Link] Clock clock;
        [Link] Stock Animals;
        [Link] Supplement Feed;
        [Link] Summary Summary;
        [Link] IPlant plant;
        [Link] Soil Soil;
        [Link] Zone Paddock;
        [Link] ScriptCompiler compiler;


        [Description("Date to shear animals (dd-mmm)")] 
        public string ShearDate { get; set; }
        
         // <summary>Description of something that has happened.</summary>
        public string EventName { get; set; }

        
            // Shear all animals on specified date
        [EventSubscribe("DoManagement")]
        private void OnDoManagement(object sender, EventArgs e)
        {
                    EventName = string.Empty;
                    
            if (DateUtilities.DatesEqual(ShearDate, clock.Today))
            {
                Animals.Shear(shearAdults: true, shearYoung: true);
                EventName = "Animals shorn";
            }
    }
 }
 }
```
    Manager Graze
      DoVerbose = False
      Rotating = True
      InitialLocation = [Trial Scripts]
      StockingRate = 0
      RotationMethod = FixedTimePasture
      TargetRotationLength = 0
      PostGrazingResidual = 0
      PostCuttingResidual = 0
      HarvestExcessHerbage = False
      finish_level_pasture = 0
      CropGrazing = Stage
      StartDate =
      EndDate =
      StartStage =
      EndStage =
      FeedlotZone =
      SupplementAmount = 0
      SupplementType =
      SupplementMaxAmount = 0
      SupplementReplenishCriteriaType =
      SupplementMinAmount = 0
      SupplementReplenishDate =
      FeedWedge = False
```csharp
using System.Diagnostics;
using Models.AgPasture;
using System.Collections.Generic;
using System.Collections;
using Models.Soils;
using Models.PMF;
using System.Xml.Serialization;
using APSIM.Shared.Utilities;
using Models.GrazPlan;
using Models.Utilities;
using Models.Core;
using System;
using System.Linq;
using Models.ForageDigestibility;
using Models.Management;

namespace Models
{

    [Serializable]
    public class Script : Model
    {
        [Link] Clock clock;
        [Link] Stock stock;
        [Link] Supplement supplement;
        [Link] Plant crop;
        [Link] Zone[] Paddocks;
        [Link] ISummary summary = null;
        [Link] Simulation Farm;
        [Link] Forages forages = null;

        //List<AgPasture.PastureSpecies> Pasture = new List<AgPasture.PastureSpecies>();
  
        public class PaddockInfo
        {
            public Zone Field { get; }
            public IEnumerable<ModelWithDigestibleBiomass> Forages { get; }
            public double HarvestableBiomass
            {
                get
                {
                    double total = 0;
                    foreach (var model in Forages)
                        foreach (var material in model.Material)
                            total += material.Consumable.Wt * 10; // g/m2 to kg/ha
                    return total;            
                }
            }
             public PaddockInfo(IEnumerable<ModelWithDigestibleBiomass> forages, Zone field)
            {
                Field = field;
                Forages = forages;
            }
            }

        public enum RotationMethodType
        {
            FixedTimePasture,
            BestPasture,
            Crop
                    }
                    
       public enum CropGrazingMethodType
        {
            Date,
            Stage
                    }
                    
                    
        [Description("Do verbose reporting from this script (tick for yes): ")] 
        public bool DoVerbose { get; set; }

        [Separator("Whole farm and initial location")]
        
         [Description("Set a Rotation for animals: ")]        
       public bool Rotating { get; set; }
       
       //need something to specify which animals

        [Description("Initial location of the animasls (paddock name):")] 
        [Display(Type=DisplayType.Model, ModelType=typeof(Zone))]
        public IModel InitialLocation { get; set; }

       [Description("Whole-farm stocking rate (head/ha): ")]
        public double StockingRate { get; set; } 

        [Separator("Settings for the rotation")]    
            
        [Description("Rotation Method ")] 
        [Display(EnabledCallback = "RotatingEnabled")]
        public RotationMethodType RotationMethod { get; set; } 

        [Description("Target rotation length (days/paddock): ")] 
         [Display(EnabledCallback = "FixedTimePastureEnabled")]
        public int TargetRotationLength { get; set; }

        [Description("Post-grazing residual to trigger pasture conservation (kgDM/ha): ")] 
        public double PostGrazingResidual { get; set; }

        [Description("Post-cutting residual (kgDM/ha): ")] 
        public double PostCuttingResidual { get; set; }

        [Description("Harvest excess herbage above residual when cows leave the paddock?: ")] 
        public bool HarvestExcessHerbage { get; set; }
        
        [Description("Maximum pasture mass (kgDM/ha) (needs to be under this amount before looking for best pasture):")]
        [Display(EnabledCallback = "BestPastureEnabled")]
        public double finish_level_pasture {get;set;}
        
        [Description("Crop Grazing Window ")] 
        [Display(EnabledCallback = "CropEnabled")]
        public CropGrazingMethodType CropGrazing { get; set; } 
        
        [Description("First date to consider moving animals:")] 
        [Display(EnabledCallback = "CropEnabled")]
        public string StartDate { get; set; }

        [Description("Last date to consider moving animals:")]
        [Display(EnabledCallback = "CropEnabled")]
        public string EndDate { get; set; }
        
        [Description("First stage to consider moving animals (if not date):")] 
       [Display(EnabledCallback = "CropEnabled")]
        public string StartStage { get; set; }

        [Description("Last stage to consider moving animals (if not date):")]
        [Display(EnabledCallback = "CropEnabled")] //would like this to be just if stage is the type
        public string EndStage { get; set; }

        [Separator("Settings for supplementary feeding")]
        
        [Description("DM trigger for Supplementing")]
        public double dosupplement { get; set; }
  
        [Description("Name of zone representing the feedlot")]
        [Display(Type=DisplayType.Model, ModelType=typeof(Zone))]
        public IModel FeedlotZone { get; set; }

        [Description("The amount of supplement to feed each animal each day (kg DM /head /day)")]
        public double SupplementAmount { get; set; }

        [Description("The type of supplement to feed the animals")]
        public string SupplementType { get; set; }

        [Description("Maximum supplement store - top up the store to this value when buying (kg DM)")]
        public double SupplementMaxAmount { get; set; }

        [Description("Criteria upon which to replenish the supplement store - ReplenishOnDate or ReplenishOnMinimum")]
        public string SupplementReplenishCriteriaType { get; set; }

        [Description("If 'ReplenishOnMinimum' then give the amount to trigger a buy supplement event (kg DM)")]
        public double SupplementMinAmount { get; set; }

        [Description("If 'ReplenishOnDate' then give the date to trigger a buy supplement event (dd-mmm)")]
        public string SupplementReplenishDate { get; set; }
        
        [Separator("FeedWedge")]
        
         [Description("Do you want to output Average Pasture Cover (APC)? ")]        
       public bool FeedWedge { get; set; }
       

        public int NumStock { get; set; } // number of animals on the whole farm
        public int NumStockinPaddock {get; set;} // count number of each animal group in each paddock
        public string TypeStockinPaddock {get;set;} // group in paddock
        
        public string pastLocationName { get; set; }  // 
        public string newLocationName { get; set; }  // 
        public string best_paddock {get; set;}
        
        public int CurrentLocationNum { get; set; }  // name of the paddock that the cows are currently in
        public string CurrentLocationName { get; set; }
        public int NumPaddocks { get; set; }
        public double SilageHarvested { get; set; } // RAmount of silage harvested (kg DM /ha)
        

        private int group_count; // how many groups are there in the simulation
        private int g = 1;      // index to the groups of animals

        //private int DaysPerPaddock;
        private int DaysInThisPaddock;
        private bool MoveToday = false;
        private bool Initialised = false;
        public double BiomassInCurrentPaddock;
        public double HarvestableBiomass { get; set; }
        public double HarvestableBiomassYesterday { get; set; }

        public event BiomassRemovedDelegate BiomassRemoved;
        public List<PaddockInfo> listOfPaddockInfo { get; set; }
        
        public double currentPaddockDM {get; set;}
        public double dm_max {get;set;}

        public double TillageDate {get;set;}
        private DateTime CheckDate;
        private string EventName;
       
        ////////////////////////////////////////////////////////////////////////////
        // Callback properties to control disabling of properties.
        ////////////////////////////////////////////////////////////////////////////

        public bool RotatingEnabled { get { return Rotating; } }

        public bool FixedTimePastureEnabled
        { 
            get
            { 
                return Rotating &&
                (RotationMethod == RotationMethodType.FixedTimePasture);
            } 
        }
        public bool BestPastureEnabled
        { 
            get
            { 
                return Rotating &&
                (RotationMethod == RotationMethodType.BestPasture);
            } 
        }
         public bool CropEnabled
        { 
            get
            { 
                return Rotating &&
                (RotationMethod == RotationMethodType.Crop) &&
                ((CropGrazing == CropGrazingMethodType.Date)||(CropGrazing == CropGrazingMethodType.Stage));
            }           
        }
        
        
        
      ////////////////////////////////////////////////////////////////////////////
        // Initialise
        //////////////////////////////////////////////////////////////////////////// 
        
                private void Initialise()
        {
            summary.WriteMessage(this, "Initialising the paddock information", MessageType.Diagnostic);
            listOfPaddockInfo = new List<PaddockInfo>();
            CurrentLocationName = InitialLocation.Name;

            GetPaddockInfo();
            //HarvestableBiomass = Farm.

            NumStock = (int)(Math.Round(StockingRate * Farm.Area, 0));

            //SetInitialCowStuff();

            if (NumStock > 0)
                stock.Move(CurrentLocationName);

            summary.WriteMessage(this, "     The number of animals has been rounded to " + NumStock + " from " + (StockingRate * Farm.Area), MessageType.Diagnostic);
            summary.WriteMessage(this, "     The animals will begin in " + CurrentLocationName + " which is paddock number " + CurrentLocationNum + " in the simulation", MessageType.Diagnostic);
            summary.WriteMessage(this, "     The area of the whole farm is " + Farm.Area + " ha", MessageType.Diagnostic);

            DaysInThisPaddock = -1;
            SilageHarvested = 0.0;
            Initialised = true;
        }
        
     

        [EventSubscribe("DoManagement")]
        private void OnDoManagement(object sender, EventArgs e)
        {
            if (!Initialised)
                Initialise();
            SilageHarvested = 0.0;

            MoveToday = false;
            
            // Calculate forage mass in the paddock
            HarvestableBiomass = 0.0;
            foreach  (var forage in forages.ModelsWithDigestibleBiomass.Where(f => f.Zone.Name == CurrentLocationName))
                        HarvestableBiomass += forage.Material.Sum(f => f.Total.Wt);
            
            HarvestableBiomass *= 10;  // Convert to kg/ha
           
            
      ////////////////////////////////////////////////////////////////////////////
        // Script for FixedTimePasture
        ////////////////////////////////////////////////////////////////////////////    
        
        
            DaysInThisPaddock += 1;
            if (RotationMethod == RotationMethodType.FixedTimePasture && DaysInThisPaddock >= TargetRotationLength)
            {
                MoveToday = true;

                pastLocationName = CurrentLocationName;
                if (CurrentLocationNum < NumPaddocks - 1)
                {
                    CurrentLocationNum += 1;
                    newLocationName = listOfPaddockInfo[CurrentLocationNum].Field.Name;
                }
                else
                {
                    CurrentLocationNum = 0;
                    newLocationName = listOfPaddockInfo[CurrentLocationNum].Field.Name;
                }
                CurrentLocationName = listOfPaddockInfo[CurrentLocationNum].Field.Name;
           

                if (HarvestExcessHerbage)
                {
                    foreach (Zone paddock in Paddocks)
                    {
                        if (paddock.Name == pastLocationName)
                        {
                            double pastPaddockBiomass = 0.0;
                            foreach (var forage in forages.ModelsWithDigestibleBiomass.Where(f => f.Zone.Name == pastLocationName))
                                pastPaddockBiomass += forage.Material.Sum(f => f.Total.Wt) * 10;   // kg/ha 

                            if (pastPaddockBiomass > PostGrazingResidual)  
                            {
                                foreach (var forage in forages.ModelsWithDigestibleBiomass.Where(f => f.Zone.Name == pastLocationName))
                                {
                                    var aboveGroundWt = forage.Material.Sum(f => f.Total.Wt) * 10;  // kg/ha 
                                    var amountToRemove = aboveGroundWt / pastPaddockBiomass * PostCuttingResidual;
                                    forage.RemoveBiomass(type: "SetResidueAmount", amount: amountToRemove / 10);
                                    SilageHarvested += amountToRemove;
                                }

                            }
                        }
                    }
                }
            }
            
            
        ////////////////////////////////////////////////////////////////////////////
        // Script for BestPasture
        ////////////////////////////////////////////////////////////////////////////        

 if (RotationMethod == RotationMethodType.BestPasture)
            {
                MoveToday = true;

                if ((currentPaddockDM < dm_max) && (dm_max > finish_level_pasture)) //if a better paddock is found that is above the finish level
            {
                  {
   /// <summary>
   /// Move animals around pasture paddocks based on available biomass
   /// They will only be moved by this function if they are on a pasture paddock already.              
   /// </summary>
   {
  		 CheckDate = DateTime.Parse(clock.Today.ToString());
         CheckDate= CheckDate.AddDays(2);
      // only draft if there are stock and check every 2 days
      if ((NumStock > 0) && (clock.Today==CheckDate))  // checks pasture threshold every second day for the dm threshold.
      {   
      
         
         double dm_max = 0.0;
         
         double currentPaddockDM = HarvestableBiomass;  // kg/ha   //get dm in stocked paddock
         if (currentPaddockDM < finish_level_pasture) //if current paddock for stock < biomass threshold (kg/ha)  
         { 
                     stock.Move(best_paddock);//need to link best_paddock to script at bottom
                     DaysInThisPaddock = 0;
          if (DoVerbose)
                    summary.WriteMessage(this, "moving Stock to " + listOfPaddockInfo[CurrentLocationNum].Field.Name, MessageType.Diagnostic);
                  }
               }
            }

         }}}
                            
                      
                        
        ////////////////////////////////////////////////////////////////////////////
        // Script for Crop
        ////////////////////////////////////////////////////////////////////////////  
        
//same as fixed time above but with options for when to put on and off (DM, stage, expression) and then have an additional rule to move stock if there are any operations
            if (RotationMethod == RotationMethodType.Crop && crop.IsAlive)
            {
            double stage = (double)crop.FindByPath("Phenology.Stage").Value;
        	
 
            	bool MoveToday = false;
            	if (CropGrazing == CropGrazingMethodType.Date && (DateUtilities.WithinDates(StartDate, clock.Today, EndDate)))
            		MoveToday = true;
            
             	//else if (CropGrazing == CropGrazingMethodType.Stage && stage >= StartStage && stage<EndStage)
             		//MoveToday=true;
             		
             
             	else if (DateUtilities.WithinDates(crop.SowingDate,clock.Today,crop.SowingDate))
             		MoveToday = true;
             		
             	else if (DateUtilities.WithinDates(TillageDate.ToString(),clock.Today,TillageDate.ToString()))  //I have a strong feeling this is not going to work
             		MoveToday = true;

                pastLocationName = CurrentLocationName;
                if (CurrentLocationNum < NumPaddocks - 1)
                {
                    CurrentLocationNum += 1;
                    newLocationName = listOfPaddockInfo[CurrentLocationNum].Field.Name;
                }
                else
                {
                    CurrentLocationNum = 0;
                    newLocationName = listOfPaddockInfo[CurrentLocationNum].Field.Name;
                }
                CurrentLocationName = listOfPaddockInfo[CurrentLocationNum].Field.Name;
				}


        ////////////////////////////////////////////////////////////////////////////
        // Script for Supplement--not sure how to manage the supplement: do you need a trigger (dm on paddocks, overall grazing window, condition score of animals?) to put on supplement?
        ////////////////////////////////////////////////////////////////////////////  
//Supplement

        {

			if (dm_max<dosupplement)
			stock.Move(FeedlotZone);  //not sure what the feedlot is: other option is to have a paddock called "feedlot" so it is stock.Move("feedlot")
            CurrentLocationName = "Feedlot";
            EventName = "Animals moved to feedlot";
			
			
			
			
				
			
            // Determine how many animals are in feedlot.
            var animalGroupsInFeedlot = stock.AnimalGroups.Where(group => group.PaddOccupied.Name == FeedlotZone.Name);
            var totalNumAnimalsInFeedlot = animalGroupsInFeedlot.Sum(group => group.NoAnimals);

            // If there are animals in feedlot then feed them.
            if (totalNumAnimalsInFeedlot > 0)
                supplement.Feed(SupplementType, SupplementAmount * totalNumAnimalsInFeedlot, FeedlotZone.Name);     

            // Restock the supplement store if amount falls below SupplementMinAmount kg DM
            if (SupplementReplenishCriteriaType == "ReplenishOnDate" && DateUtilities.DatesAreEqual(SupplementReplenishDate, clock.Today))
            	supplement.Buy(SupplementMaxAmount - supplement.Stores[1].Stored, SupplementType);
            if (SupplementReplenishCriteriaType == "ReplenishOnMinimum" && supplement.Stores[1].Stored < SupplementMinAmount)
              	supplement.Buy(SupplementMaxAmount - supplement.Stores[1].Stored, SupplementType);
        }}
    


        ////////////////////////////////////////////////////////////////////////////
        // Script for FeedWedge
        ////////////////////////////////////////////////////////////////////////////  
//This is for efficiency--generate output and allow for a choice to remove paddock(s) from the rotation
//Daily graph with pasture APC (average pasture cover)
//Daily graph of food source

        ////////////////////////////////////////////////////////////////////////////
        // Script for Visual Checks Output 
        ////////////////////////////////////////////////////////////////////////////  
//Daily pictorial of animal location
 
            
            
            
            
					public void GetPaddockInfo()
        {
            NumPaddocks = 0;
            CurrentLocationNum = 0;

            foreach (Zone paddock in Paddocks)
            {
                NumPaddocks += 1;

                var paddockInfo = new PaddockInfo(forages.ModelsWithDigestibleBiomass.Where(f => f.Zone == paddock), paddock);
                listOfPaddockInfo.Add(paddockInfo);

                summary.WriteMessage(this, "     Paddock " + NumPaddocks + " is called " + paddock.Name + ", has an area of " + paddock.Area + " ha and an initial harvestable biomass of " + paddockInfo.HarvestableBiomass + " kg DM / ha", MessageType.Diagnostic);

            }
            
            CurrentLocationNum = listOfPaddockInfo.FindIndex(p => p.Field.Name == CurrentLocationName);
            if (CurrentLocationNum == -1)
                throw new Exception($"Cannot find paddock {CurrentLocationName}");

        }
        
          public double bestPaddockDM()
   {
      double dm_max = 0;
      //(find paddock with most pasture)
      for (int p = 1; p <= 8; p++) //for each pasture paddock
      {
         string otherPaddock = "PasturePaddock" + p.ToString(); // Going through each pasture paddock and allocating 1-6
         double other_dm = HarvestableBiomass; //get dm amount
         if (other_dm > dm_max) 
         {
            dm_max = other_dm;
         }
      }
      return dm_max;
   }
        
        
       
        }}
```
    Manager Join
      PromoteEarly = False
      JoinEarlyDate =
      JoinFirstDate =
      JoinLastDate =
      Join_Length = 0
      wean_age_days = 0
      mated_to =
      mating_offset = 0
      lambing_rate =
      gestation = 0
      castrate = False
      num_castrate = 0
      num_to_wean = 0
```csharp
using System.Diagnostics;
using Models.AgPasture;
using System.Collections.Generic;
using System.Collections;
using Models.Soils;
using Models.PMF;
using System.Xml.Serialization;
using APSIM.Shared.Utilities;
using Models.GrazPlan;
using Models.Utilities;
using Models.Core;
using System;
using System.Linq;
using Models.ForageDigestibility;

namespace Models
{


        //List<AgPasture.PastureSpecies> Pasture = new List<AgPasture.PastureSpecies>();

        [Serializable]
    public class Script : Model
    {
        [Link] Clock clock;
        [Link] Stock stock;
        [Link] Summary Summary;
        [Link] IPlant plant;
        [Link] Soil Soil;
        [Link] Zone Paddock;
        [Link] ScriptCompiler compiler;
            
        [Description("Promote for breeding early?")]
        public bool PromoteEarly { get; set; }
      
       [Description("Promotion day for breeding (dd-mmm)")] 
       [Display(EnabledCallback = "PromoteEarly")]
        public string JoinEarlyDate { get; set; }
      
       [Description("First date to consider joining animals (dd-mmm)")] 
        public string JoinFirstDate { get; set; }

        [Description("Last date to consider joining animals (dd-mmm)")] 
        public string JoinLastDate { get; set; }  
        
        [Description("Number of days allowed for joining")] 
        public int Join_Length { get; set; }  
        
        [Description("Age of lambs at weaning (days)")] 
        public int wean_age_days { get; set; }  
        
        [Description("Terminal breed")] 
        public string mated_to { get; set; }  
        
        [Description("Time (days) from joining of rams and first mating")] 
        public int mating_offset { get; set; }  
        
        [Description("Number of lambs born per ewe")] 
        public string lambing_rate { get; set; }  
        
        [Description("Number of days for gestation.")] 
        public int gestation { get; set; }  
        
        [Description("Male stock are castrated (wether lambs).")] 
        public bool castrate { get; set; }  
        
        [Description("How many castrated (wether lambs).")] 
        public int num_castrate { get; set; }      
        
        [Description("How many weaned (male and female lambs).")] 
        public int num_to_wean { get; set; }      
        
        private string EventName;
        
        private DateTime JoinDate;
        
        private DateTime join_median;
        
        private DateTime birthsday;
        
        private DateTime castrate_day;
        
        private DateTime wean_day;
        
  

   // Ewe reproduction and lamb management //
   
   /// <summary>
   /// Joining ewes                                
   /// </summary>
   
         [EventSubscribe("DoManagement")]
        private void OnDoManagement(object sender, EventArgs e)
        {
            EventName = string.Empty;
            
            if (DateUtilities.WithinDates(JoinEarlyDate, clock.Today, JoinLastDate) || DateUtilities.WithinDates(JoinFirstDate, clock.Today, JoinLastDate))
                {  
                stock.Join(mated_to, Join_Length);
                
                JoinDate = clock.Today;
                }
                
            if (DateUtilities.WithinDates(castrate_day, clock.Today, castrate_day))
            {
            stock.Castrate(num_castrate); //not sure if you want to do this as a % of all males?
   
   			if (DateUtilities.WithinDates(wean_day, clock.Today, wean_day))
   				{
   				stock.Wean(num_to_wean,true,true); //not sure if you want to do this as a % of all lambs? the first true refers to male lambs, the second to female: do people ever want one not the other?
   				}
   				//I think this automatically regroups them. need to put in a line to move them to a new paddock. In Lucy's script, she just moves them to another paddock immediately by naming which paddock they'd move to and then lets the rotation (graze) script take over
   
   }}
   
   
      // Ewe reproduction and lamb management //
                               
   private void joinEwes()
   { 
      //Setting reproductive cycle + lamb management relative to joining date (as done in AusFarm)
      // these dates are day-of-year. Equate with today.DayOfYear
      
     JoinDate = DateTime.Parse(JoinDate.ToString());        
     join_median = JoinDate.AddDays(mating_offset-1); //in Lucy's code she divides this by 365         
     birthsday = (join_median.AddDays(gestation - 1));  //in Lucy's code she divides this by 365 and then adds 1                                  
	 castrate_day = JoinDate.AddDays(Join_Length+gestation-1); //in Lucy's code she divides this by 365 and then adds 1    
     wean_day = join_median.AddDays(gestation + wean_age_days - 1);  //in Lucy's code she divides this by 365 and then adds 1             
  
  
  //this is from Lucy's code. I don't this it's necessary.       
   //   for (int g = 1; g <= stock.NoGroups; g++) 
     // {
        // int animalTag = stock.tag_no[g - 1];             // stock tag details
        // if (animalTag == EWES);                        // if animal = 1 (assigned to EWES)
       //  {
           // JoinType joining = new JoinType();		//this is from Lucy's code: not sure what it is
         //   joining.group = g;
           // joining.mate_days = join_length;
          //  joining.mate_to = mated_to;
          //  stock.Join(joining);                        // stock mated_to = terminal sire, for join_length - both parameters
         }  
      }
   }
```
  Folder Simple Rotational Grazing Example
    Memo Simple Rotational Grazing Explained
      “Simple Rotational Grazing” is an example of a simple 5-paddock set-duration rotation.

      Stock are bought (see the Manager component “BuyStock”) as the simulation initialises and they remain in the simulation for the duration (not continually bought and sold). This component has a user input of the desired whole-farm stocking rate. It scans the simulation for all the paddocks and sums their areas to give the area of the whole farm and then buys sufficient head of stock to achieve the user input of stocking rate. The user also sets the type of stock to buy.

      The Manager component “TargetRotationLength” moves the stock between paddocks, optionally harvests unutilised herbage and also optionally feeds silage to the stock.

      The scripts provide examples of:

      * setting several commonly-needed stock characteristics
      * buying stock
      * finding out the current location of the stock
      * changing the location of the stock
      * feeding supplements based on a range of criteria
      * harvesting excess biomass
    Simulation A Simple Rotational Grazing
      Clock: Start=2001-07-01; End=2003-06-30
      Summary SummaryFile
      SoilArbitrator
      MicroClimate: a_interception=0; b_interception=0; c_interception=0; d_interception=0; SoilHeatFluxFraction=0.4; MinimumHeightDiffForNewLayer=0; NightInterceptionFraction=0.5; ReferenceHeight=2
      Weather: FileName=%root%\Examples\WeatherFiles\lincoln.met
      Stock: RandSeed=9999
      Forages
        Parameters:
          Name                          IsLive  DigestibilityString  FractionConsumable  MinimumAmount  UseDigestibilityFromModel
          SurfaceOrganicMatter.Residue  true    0.7                  1                   100            false
          SurfaceOrganicMatter.Residue  false   0.3                  1                   0              false
          AGPRyegrass.Leaf              true    0.7                  1                   100            false
          AGPRyegrass.Leaf              false   0.3                  1                   0              false
          AGPRyegrass.Stem              true    0.7                  1                   100            false
          AGPRyegrass.Stem              false   0.3                  1                   0              false
          AGPRyegrass.Stolon            true    0.7                  1                   100            false
          AGPRyegrass.Stolon            false   0.3                  1                   0              false
          AGPWhiteClover.Leaf           true    0.7                  1                   100            false
          AGPWhiteClover.Leaf           false   0.3                  1                   0              false
          AGPWhiteClover.Stem           true    0.7                  1                   100            false
          AGPWhiteClover.Stem           false   0.3                  1                   0              false
          AGPWhiteClover.Stolon         true    0.7                  1                   100            false
          AGPWhiteClover.Stolon         false   0.3                  1                   0              false
      Supplement: SpoilageTime=0
        Stores:
          Name                Stored  IsRoughage  DMContent  DMD   MEContent  CPConc  ProtDg  PConc   SConc   EEConc  ADIP2CP  AshAlk  MaxPassage
          fodder              0       true        0.85       0     0          0       0       0       0       0       0        0       0
          silage_highquality  0       true        1          0.85  12         0.16    0.7     0.0032  0.0024  0.02    0.06     0.6     0
      Report ReportFarm: EventNames=[Clock].EndOfDay
        VariableNames:
          [Clock].Today
          //[TargetRotationLength].Script.CurrentLocationNum as CurrentLocNum
          [Stock].PastIntakeAll.Weight as IntakePast
          [Stock].SuppIntakeAll.Weight as IntakeSupp
          [Stock].IntakeAll.Weight as IntakePastSupp
          //[Stock].Paddock as StockInPaddockName
          //[TargetRotationLength].Script.CurrentLocationNum as StockInPaddockNum
          [Stock].NumberAll
          [Stock].BaseWtAll
          [Stock].CondScoreAll
          [Stock].IntakeAll.Weight * [Stock].NumberAll as TotalIntake
          //([Paddock00].AGPRyegrass.HerbageGrowthWt + [Paddock00].AGPWhiteClover.HerbageGrowthWt) * [Paddock00].Area + ([Paddock01].AGPRyegrass.HerbageGrowthWt + [Paddock01].AGPWhiteClover.HerbageGrowthWt) * [Paddock01].Area + ([Paddock02].AGPRyegrass.HerbageGrowthWt + [Paddock02].AGPWhiteClover.HerbageGrowthWt) * [Paddock02].Area as TotalGrowth
          [Supplement].Stores[2].Stored
          [Stock].Paddock
          //[TargetRotationLength].Script.SilageHarvested as SilageHarvested
          [Sell].Script.numberSellableAnimals
      Memo Memo1
        These plots (working left to right and top to bottom) show:

        * The liveweight and condition score of the stock. By the end of the simulation the stock (Angus steers – see the BuyStock component) are reaching their mature liveweight and gains have levelled off. The blue shaded background shows the location of the stock at any time with different intensities of blue for different paddocks. Click and hold on the shading to see the location value.
        * The pasture intake (on a per head basis) and total intake. Total intake is greater than the pasture intake when there is silage supplementation.
        * The standing pasture biomass in each of the paddocks (the lines) with the head count of the stock as symbols. The decline in head count is because there are some deaths. The farm us under-stocked in the second year with paddocks accumulating high biomass values.
        * Growth rates in the paddocks and an accumulation of harvested silage
      Zone Paddock01: Area=10; Slope=0; AspectAngle=0; Altitude=50
        Irrigation
        Fertiliser
        SurfaceOrganicMatter: InitialResidueName=Sward; InitialResidueType=grass; InitialResidueMass=1000; InitialStandingFraction=0; InitialCPR=0; InitialCNR=15
        PastureSpecies AGPRyegrass: doyGermination=275; daysEmergenceToAnthesis=120; daysAnthesisToMaturity=85; degreesDayForAnthesis=1100; degreesDayForMaturity=900; daysAnnualsFactor=45; InitialShootDM=2100; InitialRootDM=450; InitialRootDepth=750; initialDMFractionsGrasses=[0.15, 0.25, 0.25, 0.05, 0.05, 0.1, 0.1, 0.05, 0, 0, 0]; initialDMFractionsForbs=[0.2, 0.2, 0.15, 0.05, 0.1, 0.15, 0.1, 0.05, 0, 0, 0]; PhotosyntheticEfficiency=0.01; PhotosynthesisCurveFactor=0.8; FractionPAR=0.5; ReferenceCO2=380; CO2EffectScaleFactor=700; CO2EffectOffsetFactor=600; CO2EffectMinimum=0.7; CO2EffectExponent=2; ReproSeasonDurationCoeff=2; ReproSeasonShouldersLengthFactor=1; ReproSeasonOnsetDurationFactor=0.6; RelativeTurnoverEmerging=2; DetachmentDroughtCoefficient=3; DetachmentDroughtEffectMin=0.1; TurnoverStockFactor=0.01; TurnoverDefoliationEffectMin=0.025; MinimumGreenLeafProp=0.8; MinimumGreenRootProp=0.5
          initialDMFractionsLegumes=[0.16, 0.23, 0.22, 0.05, 0.03, 0.05, 0.05, 0.01, 0.04, 0.08, 0.08]
          LinearInterpolationFunction FVPDFunction
        PastureSpecies AGPWhiteClover: doyGermination=275; daysEmergenceToAnthesis=120; daysAnthesisToMaturity=85; degreesDayForAnthesis=1100; degreesDayForMaturity=900; daysAnnualsFactor=45; InitialShootDM=700; InitialRootDM=150; InitialRootDepth=350; initialDMFractionsGrasses=[0.15, 0.25, 0.25, 0.05, 0.05, 0.1, 0.1, 0.05, 0, 0, 0]; initialDMFractionsForbs=[0.2, 0.2, 0.15, 0.05, 0.1, 0.15, 0.1, 0.05, 0, 0, 0]; PhotosyntheticEfficiency=0.01; PhotosynthesisCurveFactor=0.8; FractionPAR=0.5; ReferenceCO2=380; CO2EffectScaleFactor=700; CO2EffectOffsetFactor=600; CO2EffectMinimum=0.7; CO2EffectExponent=2; ReproSeasonDurationCoeff=2; ReproSeasonShouldersLengthFactor=1; ReproSeasonOnsetDurationFactor=0.6; RelativeTurnoverEmerging=2; DetachmentDroughtCoefficient=3; DetachmentDroughtEffectMin=0.1; TurnoverStockFactor=0.01; TurnoverDefoliationEffectMin=0.025; MinimumGreenLeafProp=0.8; MinimumGreenRootProp=0.5
          initialDMFractionsLegumes=[0.16, 0.23, 0.22, 0.05, 0.03, 0.05, 0.05, 0.01, 0.04, 0.08, 0.08]
          LinearInterpolationFunction FVPDFunction
        Soil LismoreSoil: SoilType=NZ_Sedimentary; LocalName=Lismore; Site=Winchmore; NearestTown=Ashburton; Region=Canterbury; Country=New Zealand; Latitude=-48.48; Longitude=0
          Chemical: Thickness=[150, 150, 200, 150, 250, 300, 300]; PH=[6, 6, 6, 6, 6, 6, 6]; PHUnits=Water
          Physical
            Thickness  ParticleSizeClay  BD    AirDry  LL15   DUL    SAT   KS
            150        20                1.3   0.05    0.15   0.36   0.45  5000
            150        15                1.35  0.12    0.14   0.34   0.43  2500
            200        12                1     0.055   0.055  0.19   0.25  3000
            150        8                 0.53  0.015   0.015  0.065  0.15  10000
            250        6                 0.31  0.01    0.01   0.04   0.11  17500
            300        5                 0.3   0.01    0.01   0.03   0.11  20000
            300        5                 0.3   0.01    0.01   0.03   0.11  20000
            SoilCrop AGPRyegrassSoil: LL=[0.15, 0.14, 0.06, 0.02, 0.01, 0.01, 0.01]; KL=[0.1, 0.1, 0.08, 0.04, 0.01, 0, 0]; XF=[1, 1, 1, 1, 1, 0, 0]
            SoilCrop AGPWhiteCloverSoil: LL=[0.15, 0.14, 0.06, 0.02, 0.01, 0.01, 0.01]; KL=[0.1, 0.1, 0.08, 0.04, 0.01, 0, 0]; XF=[1, 1, 1, 1, 1, 0, 0]
          WaterBalance SoilWater: SummerDate=1-Nov; SummerU=6; SummerCona=3.5; WinterDate=1-apr; WinterU=2; WinterCona=2; DiffusConst=88; DiffusSlope=35; Salb=0.13; CN2Bare=73; CNRed=20; CNCov=0.8; DischargeWidth=0; CatchmentArea=0; PSIDul=-100
            Thickness  SWCON  KLAT
            150        0.5    0
            150        0.52   0
            200        0.55   0
            150        0.6    0
            250        0.65   0
            300        0.65   0
            300        0.65   0
          Organic: FOMCNRatio=40; CarbonUnits=Total
            Thickness  Carbon  SoilCNRatio  FBiom  FInert  FOM
            150        3       12           0.04   0.5     331.337
            150        1       12           0.02   0.7     245.461
            200        0.6     12           0.02   0.83    164.537
            150        0.4     12           0.01   0.9     121.892
            250        0.25    12           0.01   0.95    73.9313
            300        0.15    12           0      0.99    40.5743
            300        0.1     12           0      0.99    22.2677
          Water: Thickness=[150, 150, 200, 150, 250, 300, 300]; InitialValues=[0.3495, 0.33, 0.18325, 0.0625, 0.0385, 0.029, 0.029]; FilledFromTop=false
          CERESSoilTemperature Temperature
          Nutrient
          Solute NO3: Thickness=[150, 150, 200, 150, 250, 300, 300]; InitialValues=[5, 2.5, 1, 0.75, 0.5, 0.5, 0.5]; InitialValuesUnits=ppm; WaterTableConcentration=0; D0=0; DepthConstant=0; MaxDepthSoluteAccessible=0; RunoffEffectivenessAtMovingSolute=0; MaxEffectiveRunoff=0
          Solute NH4: Thickness=[150, 150, 200, 150, 250, 300, 300]; InitialValues=[0.1, 0.1, 0.1, 0.1, 0.1, 0.1, 0.1]; InitialValuesUnits=ppm; WaterTableConcentration=0; D0=0; DepthConstant=0; MaxDepthSoluteAccessible=0; RunoffEffectivenessAtMovingSolute=0; MaxEffectiveRunoff=0
          Solute Urea: Thickness=[150, 150, 200, 150, 250, 300, 300]; InitialValues=[0, 0, 0, 0, 0, 0, 0]; InitialValuesUnits=kg/ha; WaterTableConcentration=0; D0=0; DepthConstant=0; MaxDepthSoluteAccessible=0; RunoffEffectivenessAtMovingSolute=0; MaxEffectiveRunoff=0
        Report PdkReport: EventNames=[Clock].EndOfDay
          VariableNames:
            [Clock].Today
            [AGPRyegrass].AboveGroundWt + [AGPWhiteClover].AboveGroundWt as PaddockBiomass
            [AGPRyegrass].HerbageGrowthWt + [AGPWhiteClover].HerbageGrowthWt as PastureGrowthRate
            ([AGPRyegrass].HerbageGrowthWt + [AGPWhiteClover].HerbageGrowthWt) * [Zone].Area as PaddockFeedAccum  // why did I have this?
      Zone Paddock02: Area=10; Slope=0; AspectAngle=0; Altitude=50
        Irrigation
        Fertiliser
        SurfaceOrganicMatter: InitialResidueName=Sward; InitialResidueType=grass; InitialResidueMass=1000; InitialStandingFraction=0; InitialCPR=0; InitialCNR=15
        PastureSpecies AGPRyegrass: doyGermination=275; daysEmergenceToAnthesis=120; daysAnthesisToMaturity=85; degreesDayForAnthesis=1100; degreesDayForMaturity=900; daysAnnualsFactor=45; InitialShootDM=1950; InitialRootDM=450; InitialRootDepth=750; initialDMFractionsGrasses=[0.15, 0.25, 0.25, 0.05, 0.05, 0.1, 0.1, 0.05, 0, 0, 0]; initialDMFractionsForbs=[0.2, 0.2, 0.15, 0.05, 0.1, 0.15, 0.1, 0.05, 0, 0, 0]; PhotosyntheticEfficiency=0.01; PhotosynthesisCurveFactor=0.8; FractionPAR=0.5; ReferenceCO2=380; CO2EffectScaleFactor=700; CO2EffectOffsetFactor=600; CO2EffectMinimum=0.7; CO2EffectExponent=2; ReproSeasonDurationCoeff=2; ReproSeasonShouldersLengthFactor=1; ReproSeasonOnsetDurationFactor=0.6; RelativeTurnoverEmerging=2; DetachmentDroughtCoefficient=3; DetachmentDroughtEffectMin=0.1; TurnoverStockFactor=0.01; TurnoverDefoliationEffectMin=0.025; MinimumGreenLeafProp=0.8; MinimumGreenRootProp=0.5
          initialDMFractionsLegumes=[0.16, 0.23, 0.22, 0.05, 0.03, 0.05, 0.05, 0.01, 0.04, 0.08, 0.08]
          LinearInterpolationFunction FVPDFunction
        PastureSpecies AGPWhiteClover: doyGermination=275; daysEmergenceToAnthesis=120; daysAnthesisToMaturity=85; degreesDayForAnthesis=1100; degreesDayForMaturity=900; daysAnnualsFactor=45; InitialShootDM=650; InitialRootDM=150; InitialRootDepth=350; initialDMFractionsGrasses=[0.15, 0.25, 0.25, 0.05, 0.05, 0.1, 0.1, 0.05, 0, 0, 0]; initialDMFractionsForbs=[0.2, 0.2, 0.15, 0.05, 0.1, 0.15, 0.1, 0.05, 0, 0, 0]; PhotosyntheticEfficiency=0.01; PhotosynthesisCurveFactor=0.8; FractionPAR=0.5; ReferenceCO2=380; CO2EffectScaleFactor=700; CO2EffectOffsetFactor=600; CO2EffectMinimum=0.7; CO2EffectExponent=2; ReproSeasonDurationCoeff=2; ReproSeasonShouldersLengthFactor=1; ReproSeasonOnsetDurationFactor=0.6; RelativeTurnoverEmerging=2; DetachmentDroughtCoefficient=3; DetachmentDroughtEffectMin=0.1; TurnoverStockFactor=0.01; TurnoverDefoliationEffectMin=0.025; MinimumGreenLeafProp=0.8; MinimumGreenRootProp=0.5
          initialDMFractionsLegumes=[0.16, 0.23, 0.22, 0.05, 0.03, 0.05, 0.05, 0.01, 0.04, 0.08, 0.08]
          LinearInterpolationFunction FVPDFunction
        Soil LismoreSoil: same as Simple Rotational Grazing Example.A Simple Rotational Grazing.Paddock01.LismoreSoil
        Report PdkReport: same as Simple Rotational Grazing Example.A Simple Rotational Grazing.Paddock01.PdkReport
      Zone Paddock03: Area=10; Slope=0; AspectAngle=0; Altitude=50
        Irrigation
        Fertiliser
        SurfaceOrganicMatter: InitialResidueName=Sward; InitialResidueType=grass; InitialResidueMass=1000; InitialStandingFraction=0; InitialCPR=0; InitialCNR=15
        PastureSpecies AGPRyegrass: doyGermination=275; daysEmergenceToAnthesis=120; daysAnthesisToMaturity=85; degreesDayForAnthesis=1100; degreesDayForMaturity=900; daysAnnualsFactor=45; InitialShootDM=1800; InitialRootDM=450; InitialRootDepth=750; initialDMFractionsGrasses=[0.15, 0.25, 0.25, 0.05, 0.05, 0.1, 0.1, 0.05, 0, 0, 0]; initialDMFractionsForbs=[0.2, 0.2, 0.15, 0.05, 0.1, 0.15, 0.1, 0.05, 0, 0, 0]; PhotosyntheticEfficiency=0.01; PhotosynthesisCurveFactor=0.8; FractionPAR=0.5; ReferenceCO2=380; CO2EffectScaleFactor=700; CO2EffectOffsetFactor=600; CO2EffectMinimum=0.7; CO2EffectExponent=2; ReproSeasonDurationCoeff=2; ReproSeasonShouldersLengthFactor=1; ReproSeasonOnsetDurationFactor=0.6; RelativeTurnoverEmerging=2; DetachmentDroughtCoefficient=3; DetachmentDroughtEffectMin=0.1; TurnoverStockFactor=0.01; TurnoverDefoliationEffectMin=0.025; MinimumGreenLeafProp=0.8; MinimumGreenRootProp=0.5
          initialDMFractionsLegumes=[0.16, 0.23, 0.22, 0.05, 0.03, 0.05, 0.05, 0.01, 0.04, 0.08, 0.08]
          LinearInterpolationFunction FVPDFunction
        PastureSpecies AGPWhiteClover: doyGermination=275; daysEmergenceToAnthesis=120; daysAnthesisToMaturity=85; degreesDayForAnthesis=1100; degreesDayForMaturity=900; daysAnnualsFactor=45; InitialShootDM=600; InitialRootDM=150; InitialRootDepth=350; initialDMFractionsGrasses=[0.15, 0.25, 0.25, 0.05, 0.05, 0.1, 0.1, 0.05, 0, 0, 0]; initialDMFractionsForbs=[0.2, 0.2, 0.15, 0.05, 0.1, 0.15, 0.1, 0.05, 0, 0, 0]; PhotosyntheticEfficiency=0.01; PhotosynthesisCurveFactor=0.8; FractionPAR=0.5; ReferenceCO2=380; CO2EffectScaleFactor=700; CO2EffectOffsetFactor=600; CO2EffectMinimum=0.7; CO2EffectExponent=2; ReproSeasonDurationCoeff=2; ReproSeasonShouldersLengthFactor=1; ReproSeasonOnsetDurationFactor=0.6; RelativeTurnoverEmerging=2; DetachmentDroughtCoefficient=3; DetachmentDroughtEffectMin=0.1; TurnoverStockFactor=0.01; TurnoverDefoliationEffectMin=0.025; MinimumGreenLeafProp=0.8; MinimumGreenRootProp=0.5
          initialDMFractionsLegumes=[0.16, 0.23, 0.22, 0.05, 0.03, 0.05, 0.05, 0.01, 0.04, 0.08, 0.08]
          LinearInterpolationFunction FVPDFunction
        Soil LismoreSoil: same as Simple Rotational Grazing Example.A Simple Rotational Grazing.Paddock01.LismoreSoil
        Report PdkReport: same as Simple Rotational Grazing Example.A Simple Rotational Grazing.Paddock01.PdkReport
      Zone Paddock04: Area=10; Slope=0; AspectAngle=0; Altitude=50
        Irrigation
        Fertiliser
        SurfaceOrganicMatter: InitialResidueName=Sward; InitialResidueType=grass; InitialResidueMass=1000; InitialStandingFraction=0; InitialCPR=0; InitialCNR=15
        PastureSpecies AGPRyegrass: doyGermination=275; daysEmergenceToAnthesis=120; daysAnthesisToMaturity=85; degreesDayForAnthesis=1100; degreesDayForMaturity=900; daysAnnualsFactor=45; InitialShootDM=1650; InitialRootDM=450; InitialRootDepth=750; initialDMFractionsGrasses=[0.15, 0.25, 0.25, 0.05, 0.05, 0.1, 0.1, 0.05, 0, 0, 0]; initialDMFractionsForbs=[0.2, 0.2, 0.15, 0.05, 0.1, 0.15, 0.1, 0.05, 0, 0, 0]; PhotosyntheticEfficiency=0.01; PhotosynthesisCurveFactor=0.8; FractionPAR=0.5; ReferenceCO2=380; CO2EffectScaleFactor=700; CO2EffectOffsetFactor=600; CO2EffectMinimum=0.7; CO2EffectExponent=2; ReproSeasonDurationCoeff=2; ReproSeasonShouldersLengthFactor=1; ReproSeasonOnsetDurationFactor=0.6; RelativeTurnoverEmerging=2; DetachmentDroughtCoefficient=3; DetachmentDroughtEffectMin=0.1; TurnoverStockFactor=0.01; TurnoverDefoliationEffectMin=0.025; MinimumGreenLeafProp=0.8; MinimumGreenRootProp=0.5
          initialDMFractionsLegumes=[0.16, 0.23, 0.22, 0.05, 0.03, 0.05, 0.05, 0.01, 0.04, 0.08, 0.08]
          LinearInterpolationFunction FVPDFunction
        PastureSpecies AGPWhiteClover: doyGermination=275; daysEmergenceToAnthesis=120; daysAnthesisToMaturity=85; degreesDayForAnthesis=1100; degreesDayForMaturity=900; daysAnnualsFactor=45; InitialShootDM=550; InitialRootDM=150; InitialRootDepth=350; initialDMFractionsGrasses=[0.15, 0.25, 0.25, 0.05, 0.05, 0.1, 0.1, 0.05, 0, 0, 0]; initialDMFractionsForbs=[0.2, 0.2, 0.15, 0.05, 0.1, 0.15, 0.1, 0.05, 0, 0, 0]; PhotosyntheticEfficiency=0.01; PhotosynthesisCurveFactor=0.8; FractionPAR=0.5; ReferenceCO2=380; CO2EffectScaleFactor=700; CO2EffectOffsetFactor=600; CO2EffectMinimum=0.7; CO2EffectExponent=2; ReproSeasonDurationCoeff=2; ReproSeasonShouldersLengthFactor=1; ReproSeasonOnsetDurationFactor=0.6; RelativeTurnoverEmerging=2; DetachmentDroughtCoefficient=3; DetachmentDroughtEffectMin=0.1; TurnoverStockFactor=0.01; TurnoverDefoliationEffectMin=0.025; MinimumGreenLeafProp=0.8; MinimumGreenRootProp=0.5
          initialDMFractionsLegumes=[0.16, 0.23, 0.22, 0.05, 0.03, 0.05, 0.05, 0.01, 0.04, 0.08, 0.08]
          LinearInterpolationFunction FVPDFunction
        Soil LismoreSoil: same as Simple Rotational Grazing Example.A Simple Rotational Grazing.Paddock01.LismoreSoil
        Report PdkReport: same as Simple Rotational Grazing Example.A Simple Rotational Grazing.Paddock01.PdkReport
      Zone Paddock05: Area=10; Slope=0; AspectAngle=0; Altitude=50
        Irrigation
        Fertiliser
        SurfaceOrganicMatter: InitialResidueName=Sward; InitialResidueType=grass; InitialResidueMass=1000; InitialStandingFraction=0; InitialCPR=0; InitialCNR=15
        PastureSpecies AGPRyegrass: doyGermination=275; daysEmergenceToAnthesis=120; daysAnthesisToMaturity=85; degreesDayForAnthesis=1100; degreesDayForMaturity=900; daysAnnualsFactor=45; InitialShootDM=1500; InitialRootDM=450; InitialRootDepth=750; initialDMFractionsGrasses=[0.15, 0.25, 0.25, 0.05, 0.05, 0.1, 0.1, 0.05, 0, 0, 0]; initialDMFractionsForbs=[0.2, 0.2, 0.15, 0.05, 0.1, 0.15, 0.1, 0.05, 0, 0, 0]; PhotosyntheticEfficiency=0.01; PhotosynthesisCurveFactor=0.8; FractionPAR=0.5; ReferenceCO2=380; CO2EffectScaleFactor=700; CO2EffectOffsetFactor=600; CO2EffectMinimum=0.7; CO2EffectExponent=2; ReproSeasonDurationCoeff=2; ReproSeasonShouldersLengthFactor=1; ReproSeasonOnsetDurationFactor=0.6; RelativeTurnoverEmerging=2; DetachmentDroughtCoefficient=3; DetachmentDroughtEffectMin=0.1; TurnoverStockFactor=0.01; TurnoverDefoliationEffectMin=0.025; MinimumGreenLeafProp=0.8; MinimumGreenRootProp=0.5
          initialDMFractionsLegumes=[0.16, 0.23, 0.22, 0.05, 0.03, 0.05, 0.05, 0.01, 0.04, 0.08, 0.08]
          LinearInterpolationFunction FVPDFunction
        PastureSpecies AGPWhiteClover: doyGermination=275; daysEmergenceToAnthesis=120; daysAnthesisToMaturity=85; degreesDayForAnthesis=1100; degreesDayForMaturity=900; daysAnnualsFactor=45; InitialShootDM=500; InitialRootDM=150; InitialRootDepth=350; initialDMFractionsGrasses=[0.15, 0.25, 0.25, 0.05, 0.05, 0.1, 0.1, 0.05, 0, 0, 0]; initialDMFractionsForbs=[0.2, 0.2, 0.15, 0.05, 0.1, 0.15, 0.1, 0.05, 0, 0, 0]; PhotosyntheticEfficiency=0.01; PhotosynthesisCurveFactor=0.8; FractionPAR=0.5; ReferenceCO2=380; CO2EffectScaleFactor=700; CO2EffectOffsetFactor=600; CO2EffectMinimum=0.7; CO2EffectExponent=2; ReproSeasonDurationCoeff=2; ReproSeasonShouldersLengthFactor=1; ReproSeasonOnsetDurationFactor=0.6; RelativeTurnoverEmerging=2; DetachmentDroughtCoefficient=3; DetachmentDroughtEffectMin=0.1; TurnoverStockFactor=0.01; TurnoverDefoliationEffectMin=0.025; MinimumGreenLeafProp=0.8; MinimumGreenRootProp=0.5
          initialDMFractionsLegumes=[0.16, 0.23, 0.22, 0.05, 0.03, 0.05, 0.05, 0.01, 0.04, 0.08, 0.08]
          LinearInterpolationFunction FVPDFunction
        Soil LismoreSoil: same as Simple Rotational Grazing Example.A Simple Rotational Grazing.Paddock01.LismoreSoil
        Report PdkReport: same as Simple Rotational Grazing Example.A Simple Rotational Grazing.Paddock01.PdkReport
      Manager Buy
        Buying = True
        Enterprise = entWether
        Genotype = Angus
        StockingRate = 5
        CondScore = 0
        Sex = Female
        Pregnant = 0
        Lactating = 0
        Age = 12
        Weight = 100
        NumStock = 0
        BuyPolicy = Date
        BuyDate = 01-Aug
        FlexibleExpressionForBuying =
        script: same as in Trial Scripts.Buy
      Manager Sell
        Selling = True
        SaleFirstDate = 01-mar
        SaleLastDate = 01-apr
        SellPolicy = CulledForWeight
        SalePercentAnimals = 100
        SaleAge = 5
        SaleWeight = 50
        FlexibleExpressionForBuying =
```csharp
/*-------------------------------------------------------------------------------------
Sheep grazing wheat when conditions are suitable, and in feedlot the rest of the time.
---------------------------------------------------------------------------------------

In this script animals are bought and sold within a specified date window.
They are fed supplement in a feedlot at a set rate, but graze a wheat crop when a criteria is met.
Animals are moved from the wheat crop and back to feedlot when a second criteria is met.

Based on Sprague SJ, Kirkegaard JA, Dove H, Graham JM, McDonald SE, Kelman WM (2015) Integrating dual-purpose wheat and canola into high-rainfall livestock systems in south-eastern Australia. 1. Crop forage and grain yield. Crop and Pasture Science 66(4), 365-376. 

Activities in this manager:
1. Buy animals at start of year & put in feedlot
2. Move animals from feedlot to crop when ready to graze
3. Move animals from crop to feedlot 
4. Shear all animals on specified date
5. Sell all animals at end of year

NOTES
1. When the animals are in the feedlot and an animal dies during the day, the supplement has already been fed into the feedlot
   based on the number of animals in the feedlot at the start of the day. This means the remaining animals have access to slightly
   more supplement and causes a spike in supp intake graph
2. When sheep are culled for age + purchased to maintain stocking rate, several groups of sheep are created.
   This causes irregular amounts of supplement to be fed.
--------------------------------------------------------------------------------------*/


using System.Linq;
using System;
using System.Collections.Generic;
using Models.Core;
using Models.PMF;
using Models.Functions;
using Models.Soils;
using Models.Utilities;
using Models.GrazPlan;
using APSIM.Shared.Utilities;
using System.Diagnostics;

namespace Models
{
    [Serializable]
    [Description(
        "<p><b>Animals grazing a crop when conditions are suitable, and in feedlot the rest of the time.</b></p>" +
        "In this script animals are bought and sold within a specified date window. " +
        "They are fed supplement in a feedlot at a set rate, but graze a wheat crop when a criteria is met. " +
        "Animals are moved from the wheat crop and back to feedlot when a second criteria is met.")]    
    public class Script : Model
    {
        [Link] Clock clock;
        [Link] Stock Animals;
        [Link] Supplement Feed;
        [Link] Summary Summary;
        [Link] IPlant plant;
        [Link] Soil Soil;
        [Link] Zone Paddock;
        [Link] ScriptCompiler compiler;

        private IBooleanFunction expressionFunction;

        public enum SellPolicyType
        {
            Date,
            CulledForAge,
            CulledForWeight,
            SellYoung,
            Other
        }

  
        ////////////////////////////////////////////////////////
        [Separator("Selling of animals")]

        [Description("Selling animals?")] 
        public bool Selling { get; set; }

        [Description("First date to consider selling animals (dd-mmm)")] 
        public string SaleFirstDate { get; set; }

        [Description("Last date to consider selling animals (dd-mmm)")] 
        public string SaleLastDate { get; set; }

        [Description("Selling policy ")] 
        [Display(EnabledCallback = "SellingEnabled")]
        public SellPolicyType SellPolicy { get; set; }
 
        [Description("Percentage of animals to sell (%)")] 
        [Display(EnabledCallback = "SellingEnabled")]
        public double SalePercentAnimals { get; set; }

        [Description("Age at which to sell (months): ")] 
        [Display(EnabledCallback = "SellingAgeEnabled")]
        public int SaleAge { get; set; }

        [Description("Weight at which to sell (kg): ")] 
        [Display(EnabledCallback = "SellingWeightEnabled")]
        public double SaleWeight { get; set; }

       [Separator("Settings for flexible selling")]
        [Description("Expression for flexible selling criteria (e.g. AGPRyegrass.CoverTotal > 0.95)")]
        [Display(EnabledCallback = "SellingOtherEnabled")]
        public string FlexibleExpressionForBuying { get; set; }


        ////////////////////////////////////////////////////////////////////////////
        // Callback properties to control disabling of properties.
        ////////////////////////////////////////////////////////////////////////////

        public bool SellingEnabled { get { return Selling; } }
        

        public bool SellingAgeEnabled
        { 
            get
            { 
                return Selling &&
                (SellPolicy == SellPolicyType.CulledForAge);
            } 
        }

        public bool SellingWeightEnabled
        { 
            get
            { 
                return Selling &&
                (SellPolicy == SellPolicyType.CulledForWeight);
            } 
        }
        
        
        
        public bool SellingOtherEnabled
        { 
            get
            { 
                return Selling &&
                (SellPolicy == SellPolicyType.Other);
            } 
        }
        

        ////////////////////////////////////////////////////////////////////////////
        // Outputs
        ////////////////////////////////////////////////////////////////////////////
        // <summary>Number of animals sold.</summary>
        public int numberSellableAnimals { get; set; }

        // <summary>Description of something that has happened.</summary>
        public string EventName { get; set; }

        // <summary>Return a list of genotypes to the properties tab.</summary>
        public string[] GetGenotypes()
        {
            if (Animals != null)
                return Animals.Genotypes.Names.ToArray();
            return null;
        }

        public string CurrentLocation { get; set; }  // location of the sheep
        
        private IEnumerable<AnimalGroup> AnimalsToSell {get; set;}
  



        // ============================================================
        // Management that happens every day.
        // ============================================================
        [EventSubscribe("DoManagement")]
        private void OnDoManagement(object sender, EventArgs e)
        {
            EventName = string.Empty;

            // Sell animals
            // Sell animals
            if (SellingEnabled && DateUtilities.WithinDates(SaleFirstDate, clock.Today, SaleLastDate))
                       {
 
            
      
              {
                    IEnumerable<AnimalGroup> AnimalsToSell = null;                  
                    if (SellPolicy == SellPolicyType.CulledForAge)
                      {  // split older animals into a new group
                        AnimalsToSell = Animals.SplitByAge(Convert.ToInt32(SaleAge * 30)); // months to days                       
                        }
                    else if (SellPolicy == SellPolicyType.CulledForWeight)
                    {   // split heavier animals into a new group
                        Summary.WriteMessage(this, "Av Weight: " + Animals.WeightAll.ToString() ,  MessageType.Information);
                                    // Sell target weight animals
           				 splitAll.Type = "weight";
           				 splitAll.Value = SaleWeight;
          				  Animals.Split(WeightAll);
            if (Animals.NoGroups > groups)
            {
                for (int g = 1; g <= groups; g++)
                {
                    count += Animals.Number[g - 1];
                }
            }
                        
                        
                        
                        
                        
                        
                     //   AnimalsToSell = Animals.SplitByWeight(SaleWeight);  
                        
                        foreach (AnimalGroup grp in  AnimalsToSell)
                        {
                            Summary.WriteMessage(this, "Split by weight - Group numbers: " + grp.NoAnimals.ToString() + " Weight: " + grp.BaseWeight.ToString(),  MessageType.Information);
                        }
                    }
                                            
                        
                    else if (SellPolicy == SellPolicyType.SellYoung)
                        {// split young (offspring) into new groups
                        AnimalsToSell = Animals.SplitByYoung();
                        }
                        
                        
              if (AnimalsToSell != null)
                    {
                    foreach (AnimalGroup grp in  AnimalsToSell)
                       {
                            Summary.WriteMessage(this, "Group numbers: " + grp.NoAnimals.ToString() + " Weight: " + grp.BaseWeight.ToString(),  MessageType.Information);
                            Animals.Sell(grp.NoAnimals , grp);            
                                        
                                        
                       /* var numberSellableAnimals = AnimalsToSell.Sum(g => g.NoAnimals);
                        var numberAnimalsToSell = Convert.ToInt32(numberSellableAnimals);
                        if (numberAnimalsToSell > 0)
                            Animals.Sell(numberAnimalsToSell);
                            EventName = numberSellableAnimals + " animals sold";
                            Summary.WriteMessage(this,"Animals Sold!",MessageType.Information);
                            */
                       }
                    }
                    }


                    }                                 
                }
                }
                }
```
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