Simulations: Version=159
  Folder Replacements
    Report HarvestReport: EventNames=[Mungbean].Harvesting
      VariableNames:
        [Clock].Today
        [Mungbean].Grain.Total.Wt*10 as Yield
        [Mungbean].AboveGround.Wt*10 as Biomass
        [Mungbean].SowingDate
        sum of ([Weather].Rain) from [Mungbean].Sowing to [Mungbean].Harvesting as Season_Rainfall
        Season_Rainfall/Season_WaterOutput as Season_Aridity
        mean of [Weather].MaxT from [Mungbean].Sowing to [Mungbean].Harvesting as Season_MaxT
        mean of [Weather].MinT from [Mungbean].Sowing to [Mungbean].Harvesting as Season_MinT
        mean of [Weather].Radn from [Mungbean].Sowing to [Mungbean].Harvesting as Season_Radn
        mean of [Weather].VPD from [Mungbean].Sowing to [Mungbean].Harvesting as Season_VPD
        sum of ([Soil].SoilWater.Eo) from [Mungbean].Sowing to [Mungbean].Harvesting as Season_WaterOutput
        sum of ([Weather].Rain) from [Mungbean].Sowing to [Mungbean].Flowering as Veg_Rainfall
        sum of ([Soil].SoilWater.Eo from [Mungbean].Sowing to [Mungbean].Harvesting as Veg_ET
        Veg_Rainfall/Veg_ET as Veg_Aridity
        mean of [Weather].MaxT from [Mungbean].Sowing to [Mungbean].Flowering as Veg_MaxT
        mean of [Weather].MinT from [Mungbean].Sowing to [Mungbean].Flowering as Veg_MinT
        mean of [Weather].Radn from [Mungbean].Sowing to [Mungbean].Flowering as Veg_Radn
        mean of [Weather].VPD from [Mungbean].Sowing to [Mungbean].Flowering as Veg_VPD
        sum of ([Weather].Rain) from [Mungbean].Flowering to [Mungbean].Harvesting as Rep_Rainfall
        sum of ([Soil].SoilWater.Eo) from [Mungbean].Flowering to [Mungbean].Harvesting as Rep_ET
        Rep_Rainfall/Rep_ET as Rep_Aridity
        mean of [Weather].MaxT from [Mungbean].Flowering to [Mungbean].Harvesting as Rep_MaxT
        mean of [Weather].MinT from [Mungbean].Flowering to [Mungbean].Harvesting as Rep_MinT
        mean of [Weather].Radn from [Mungbean].Flowering to [Mungbean].Harvesting as Rep_Radn
        mean of [Weather].VPD from [Mungbean].Flowering to [Mungbean].Harvesting as Rep_VPD
    Report FallowWaterReport: EventNames=[Wheat].Sowing
      VariableNames:
        [ResetingRule].Script.Evaporation
        Sum([Soil].SoilWater.PAWmm[1:9]) as SoilPAW
        [Clock].Today
    Report MungbeanWaterReport: EventNames=[Wheat].Sowing
      VariableNames:
        sum of ([Soil].SoilWater.Eo) from [Mungbean].Sowing to [Wheat].Sowing as ET
        Sum([Soil].SoilWater.PAWmm[1:9]) as SoilPAW
        [Clock].Today
  DataStore
  Experiment Sim
    Factors
      Permutation
        Factor Sow: Specification=[SowingRule].Script.numdays= 0 to 180 step 1
        Factor Site
          CompositeFactor Gatton
            Specifications:
              [Weather]
              [Soil]
            Weather: FileName=Gatton.txt
            Soil: SoilType=APS6Soil; LocalName=APS6Site; Site=APS6Site; NearestTown=Unknown; Region=Lawes; NaturalVegetation=Unknown; Latitude=0; Longitude=0
              WaterBalance SoilWater: SummerDate=1-Nov; SummerU=6; SummerCona=3.5; WinterDate=1-Apr; WinterU=6; WinterCona=3.5; DiffusConst=88; DiffusSlope=35.4; Salb=0.13; CN2Bare=60; CNRed=20; CNCov=0.8; DischargeWidth=0; CatchmentArea=0; PSIDul=-100
                Thickness  SWCON  KLAT
                150        0.3    0
                150        0.3    0
                150        0.3    0
                150        0.3    0
                150        0.3    0
                150        0.3    0
                300        0.3    0
                300        0.3    0
                300        0.3    0
              Organic: FOMCNRatio=60; CarbonUnits=Total
                Thickness  Carbon  SoilCNRatio  FBiom  FInert  FOM
                150        2.08    14.5         0.03   0.45    34.7129
                150        1.21    14.5         0.02   0.6     27.0344
                150        1.21    14.5         0.01   0.78    16.3972
                150        1.15    14.5         0.01   0.78    16.397
                150        1       14.5         0.01   0.9     9.945
                150        1       14.5         0.01   0.9     9.945
                300        0.8     14.5         0.01   0.99    6.032
                300        0.45    14.5         0.01   0.99    3.659
                300        0.45    14.5         0.01   0.99    2.219
              Chemical: Thickness=[150, 150, 150, 150, 150, 150, 300, 300, 300]; PH=[7.5, 8, 8, 8, 8, 8, 8, 8, 8]; PHUnits=Water
              CERESSoilTemperature Temperature
              Nutrient
              Physical
                Thickness  BD    AirDry  LL15   DUL   SAT
                150        1.38  0.2     0.208  0.42  0.45
                150        1.34  0.273   0.273  0.42  0.45
                150        1.35  0.286   0.286  0.42  0.45
                150        1.35  0.286   0.286  0.42  0.45
                150        1.5   0.286   0.286  0.4   0.43
                150        1.5   0.286   0.286  0.4   0.43
                300        1.49  0.286   0.286  0.36  0.4
                300        1.46  0.286   0.286  0.36  0.4
                300        1.46  0.286   0.286  0.36  0.4
                SoilCrop MungbeanSoil: LL=[0.3, 0.31, 0.32, 0.33, 0.33, 0.33, 0.33, 0.33, 0.33]; KL=[0.08, 0.08, 0.06, 0.06, 0.06, 0.04, 0.02, 0.02, 0.01]; XF=[1, 1, 1, 1, 1, 1, 1, 1, 1]
                SoilCrop WheatSoil: LL=[0.3, 0.3, 0.3, 0.32, 0.32, 0.32, 0.32, 0.32, 0.32]; KL=[0.04, 0.04, 0.04, 0.08, 0.08, 0.08, 0.08, 0.04, 0.04]; XF=[1, 1, 1, 1, 1, 1, 1, 1, 1]
              Water: Thickness=[150, 150, 150, 150, 150, 150, 300, 300, 300]; InitialValues=[0.3, 0.3, 0.3, 0.3, 0.3, 0.3, 0.3, 0.3, 0.3]; RelativeTo=LL15; FilledFromTop=true
              Solute NO3: Thickness=[150, 150, 150, 150, 150, 150, 300, 300, 300]; InitialValues=[10, 5, 3, 3, 2, 2, 1, 0.1, 0.1]; InitialValuesUnits=ppm; WaterTableConcentration=0; D0=0; DepthConstant=0; MaxDepthSoluteAccessible=0; RunoffEffectivenessAtMovingSolute=0; MaxEffectiveRunoff=0
              Solute NH4: Thickness=[150, 150, 150, 150, 150, 150, 300, 300, 300]; InitialValues=[3, 2, 1, 1, 0.8, 0.8, 0.8, 0.5, 0.5]; InitialValuesUnits=ppm; WaterTableConcentration=0; D0=0; DepthConstant=0; MaxDepthSoluteAccessible=0; RunoffEffectivenessAtMovingSolute=0; MaxEffectiveRunoff=0
              Solute Urea: Thickness=[150, 150, 150, 150, 150, 150, 300, 300, 300]; InitialValues=[0, 0, 0, 0, 0, 0, 0, 0, 0]; InitialValuesUnits=kg/ha; WaterTableConcentration=0; D0=0; DepthConstant=0; MaxDepthSoluteAccessible=0; RunoffEffectivenessAtMovingSolute=0; MaxEffectiveRunoff=0
          CompositeFactor Emerald (disabled)
            Specifications:
              [Weather]
              [Soil]
            Weather: FileName=Emerald.met
            Soil: Latitude=0; Longitude=0
              WaterBalance SoilWater: SummerDate=1-Nov; SummerU=6; SummerCona=3.5; WinterDate=1-Apr; WinterU=6; WinterCona=3.5; DiffusConst=88; DiffusSlope=35.4; Salb=0.13; CN2Bare=72; CNRed=20; CNCov=0.8; DischargeWidth=5; CatchmentArea=10; PSIDul=-100; Thickness=[150, 150, 150, 150, 150, 150, 300, 300, 300]
                SWCON=[0.384, 0.379, 0.353, 0.365, 0.387, 0.401, 0.396, 0.396, 0.396]
              CERESSoilTemperature Temperature
              Organic: FOMCNRatio=33; CarbonUnits=Total
                Thickness  Carbon  SoilCNRatio  FBiom  FInert  FOM
                150        1.24    14.5         0.02   0.36    0
                150        1.24    14.5         0.015  0.5     0
                150        1.25    14.5         0.01   0.59    0
                150        1.1     14.5         0.01   0.84    0
                150        0.71    14.5         0.01   0.8     0
                150        0.34    14.5         0.01   0.99    0
                300        0.34    14.5         0.01   0.99    0
                300        0.34    14.5         0.01   0.99    0
                300        0.34    14.5         0.01   0.99    0
              Chemical: Thickness=[150, 150, 150, 150, 150, 150, 300, 300, 300]; PH=[8, 7.8, 7.8, 7.8, 7.8, 7.8, 7.8, 7.8, 7.8]; PHUnits=Water
              Nutrient
              Physical
                Thickness  BD     AirDry  LL15   DUL    SAT
                150        1.422  0.05    0.124  0.384  0.463
                150        1.431  0.148   0.148  0.379  0.46
                150        1.46   0.153   0.153  0.353  0.449
                150        1.44   0.153   0.153  0.365  0.449
                150        1.416  0.153   0.153  0.387  0.449
                150        1.394  0.153   0.153  0.401  0.449
                300        1.394  0.153   0.153  0.401  0.449
                300        1.407  0.153   0.153  0.396  0.449
                300        1.407  0.153   0.153  0.396  0.449
                SoilCrop MungbeanSoil
                  LL=[0.124, 0.148, 0.153, 0.153, 0.153, 0.153, 0.153, 0.153, 0.153]
                  KL=[0.08, 0.08, 0.08, 0.08, 0.08, 0.08, 0.08, 0.08, 0.08]
                  XF=[1, 1, 1, 1, 1, 1, 1, 1, 1]
              Water: Thickness=[150, 150, 150, 150, 150, 150, 300, 300, 300]; InitialValues=[0.42, 0.42, 0.42, 0.42, 0.4, 0.4, 0.358626, 0.286, 0.286]; RelativeTo=LL15; FilledFromTop=true
              Solute NO3: Thickness=[150, 150, 150, 150, 150, 150, 300, 300, 300]; InitialValues=[36, 9, 7, 4, 2, 0.08, 0.08, 0.08, 0.08]; InitialValuesUnits=ppm; WaterTableConcentration=0; D0=0; DepthConstant=0; MaxDepthSoluteAccessible=0; RunoffEffectivenessAtMovingSolute=0; MaxEffectiveRunoff=0
              Solute NH4: Thickness=[150, 150, 150, 150, 150, 150, 300, 300, 300]; InitialValues=[0, 0, 2, 3, 2, 1, 1, 1, 1]; InitialValuesUnits=ppm; WaterTableConcentration=0; D0=0; DepthConstant=0; MaxDepthSoluteAccessible=0; RunoffEffectivenessAtMovingSolute=0; MaxEffectiveRunoff=0
              Solute Urea: Thickness=[150, 150, 150, 150, 150, 150, 300, 300, 300]; InitialValues=[0, 0, 0, 0, 0, 0, 0, 0, 0]; InitialValuesUnits=kg/ha; WaterTableConcentration=0; D0=0; DepthConstant=0; MaxDepthSoluteAccessible=0; RunoffEffectivenessAtMovingSolute=0; MaxEffectiveRunoff=0
          CompositeFactor Pampas (disabled)
            Specifications:
              [Weather]
              [Soil]
            Weather: FileName=Pampas.met
            Soil: Latitude=0; Longitude=0; YearOfSampling=0
              Water: Thickness=[150, 150, 150, 150, 150, 150, 300, 300, 300]; InitialValues=[0.42, 0.42, 0.42, 0.42, 0.4, 0.4, 0.358626, 0.286, 0.286]; RelativeTo=LL15; FilledFromTop=true
              Physical
                Thickness  BD     AirDry  LL15   DUL    SAT
                150        1.32   0.23    0.25   0.452  0.502
                150        1.24   0.26    0.28   0.453  0.503
                150        1.24   0.29    0.29   0.462  0.512
                150        1.29   0.29    0.29   0.461  0.511
                150        1.29   0.29    0.29   0.461  0.511
                150        1.382  0.29    0.29   0.428  0.478
                300        1.382  0.29    0.29   0.428  0.478
                300        1.478  0.286   0.286  0.42   0.442
                300        1.46   0.286   0.286  0.4    0.424
                SoilCrop MungbeanSoil: LL=[0.25, 0.28, 0.31, 0.32, 0.32, 0.33, 0.33, 0.42, 0.4]; KL=[0.06, 0.06, 0.4, 0.4, 0.4, 0.3, 0.3, 0.02, 0.02]; XF=[1, 1, 1, 1, 1, 1, 1, 1, 1]
              WaterBalance SoilWater: SummerDate=1-Nov; SummerU=6; SummerCona=3.5; WinterDate=1-Apr; WinterU=6; WinterCona=3.5; DiffusConst=40; DiffusSlope=16; Salb=0.13; CN2Bare=73; CNRed=20; CNCov=0.8; PSIDul=-100; Thickness=[150, 150, 150, 150, 150, 150, 300, 300, 300]; SWCON=[0.3, 0.3, 0.3, 0.3, 0.3, 0.3, 0.3, 0.3, 0.3]
              Organic: FOMCNRatio=40; CarbonUnits=Total
                Thickness  Carbon  SoilCNRatio  FBiom  FInert  FOM
                150        1.22    12.5         0.025  0.4     82.9287
                150        1.13    12.5         0.02   0.6     55.5888
                150        1.016   12.5         0.015  0.8     30.5078
                150        0.854   12.5         0.01   0.9     16.743
                150        0.854   12.5         0.01   0.9     16.743
                150        0.517   12.5         0.01   0.95    9.189
                300        0.517   12.5         0.01   0.95    9.189
                300        0.306   12.5         0.01   0.95    5.043
                300        0.306   12.5         0.01   0.95    5.043
              Chemical: PHUnits=Water
                Thickness  PH    EC
                150        7.35  0.2
                150        8.05  0.25
                150        8.48  0.31
                150        8.87  0.4
                150        9.09  0.59
                150        9.15  0.84
                300        9.09  0.59
                300        9.15  0.84
                300        9.15  0.84
              Nutrient
              CERESSoilTemperature Temperature
              Solute NO3: Thickness=[150, 150, 150, 150, 150, 150, 300, 300, 300]; InitialValues=[11, 11, 10.25, 14, 1, 1, 1, 1, 1]; InitialValuesUnits=ppm; WaterTableConcentration=0; D0=0; DepthConstant=0; MaxDepthSoluteAccessible=0; RunoffEffectivenessAtMovingSolute=0; MaxEffectiveRunoff=0
              Solute NH4: Thickness=[150, 150, 150, 150, 150, 150, 300, 300, 300]; InitialValues=[2.75, 2.75, 2.5, 2.25, 0.2, 0.2, 0.2, 0.2, 0.2]; InitialValuesUnits=ppm; WaterTableConcentration=0; D0=0; DepthConstant=0; MaxDepthSoluteAccessible=0; RunoffEffectivenessAtMovingSolute=0; MaxEffectiveRunoff=0
              Solute Urea: same as Sim.Factors.Permutation.Site.Emerald.soil.Urea
          CompositeFactor Narrabri (disabled)
            Specifications:
              [Weather]
              [Soil]
            Weather: FileName=Narrabri.met
            Soil: Latitude=0; Longitude=0
              WaterBalance SoilWater: SummerDate=1-Nov; SummerU=6; SummerCona=3.5; WinterDate=1-Apr; WinterU=6; WinterCona=3.5; DiffusConst=88; DiffusSlope=35.4; Salb=0.13; CN2Bare=72; CNRed=20; CNCov=0.8; DischargeWidth=5; CatchmentArea=10; PSIDul=-100; Thickness=[150, 150, 150, 150, 150, 150, 300, 300, 300]; SWCON=[0.366, 0.366, 0.351, 0.284, 0.26, 0.22, 0.22, 0.22, 0.22]
              CERESSoilTemperature Temperature
              Organic: FOMCNRatio=33; CarbonUnits=Total
                Thickness  Carbon  SoilCNRatio  FBiom  FInert  FOM
                150        1.94    14.5         0.02   0.36    0
                150        1.38    14.5         0.015  0.5     0
                150        1       14.5         0.01   0.59    0
                150        0.9     14.5         0.01   0.84    0
                150        0.75    14.5         0.01   0.8     0
                150        0.6     14.5         0.01   0.99    0
                300        0.6     14.5         0.01   0.99    0
                300        0.45    14.5         0.01   0.99    0
                300        0.45    14.5         0.01   0.99    0
              Chemical: Thickness=[150, 150, 150, 150, 150, 150, 300, 300, 300]; PH=[8, 7.8, 7.8, 7.8, 7.8, 7.8, 7.8, 7.8, 7.8]; PHUnits=Water
              Nutrient
              Physical
                Thickness  BD    AirDry  LL15  DUL   SAT
                150        1.31  0.05    0.21  0.43  0.48
                150        1.26  0.21    0.21  0.44  0.49
                150        1.36  0.21    0.21  0.41  0.46
                150        1.39  0.21    0.21  0.41  0.45
                150        1.44  0.21    0.21  0.41  0.43
                150        1.45  0.21    0.21  0.4   0.42
                300        1.45  0.2     0.2   0.35  0.39
                300        1.46  0.19    0.19  0.35  0.36
                300        1.46  0.18    0.18  0.32  0.35
                SoilCrop MungbeanSoil: LL=[0.21, 0.21, 0.21, 0.21, 0.21, 0.21, 0.2, 0.19, 0.18]; KL=[0.08, 0.08, 0.08, 0.08, 0.08, 0.08, 0.08, 0.08, 0.08]; XF=[1, 1, 1, 1, 1, 1, 1, 1, 1]
              Water: Thickness=[150, 150, 150, 150, 150, 150, 300, 300, 300]; InitialValues=[0.42, 0.42, 0.42, 0.42, 0.4, 0.4, 0.358626, 0.286, 0.286]; RelativeTo=LL15; FilledFromTop=true
              Solute NO3: Thickness=[150, 150, 150, 150, 150, 150, 300, 300, 300]; InitialValues=[5, 5, 5, 4, 2, 5, 5, 5, 0.08]; InitialValuesUnits=ppm; WaterTableConcentration=0; D0=0; DepthConstant=0; MaxDepthSoluteAccessible=0; RunoffEffectivenessAtMovingSolute=0; MaxEffectiveRunoff=0
              Solute NH4: same as Sim.Factors.Permutation.Site.Emerald.soil.NH4
              Solute Urea: same as Sim.Factors.Permutation.Site.Emerald.soil.Urea
          CompositeFactor Breeza (disabled)
            Specifications:
              [Weather]
              [Soil]
            Weather: FileName=Breeza.txt
            Soil: Latitude=0; Longitude=0
              WaterBalance SoilWater: SummerDate=1-Nov; SummerU=6; SummerCona=3.5; WinterDate=1-Apr; WinterU=6; WinterCona=3.5; DiffusConst=88; DiffusSlope=35.4; Salb=0.13; CN2Bare=72; CNRed=20; CNCov=0.8; DischargeWidth=5; CatchmentArea=10; PSIDul=-100; Thickness=[150, 150, 150, 150, 150, 150, 300, 300, 300]
                SWCON=[0.526, 0.519, 0.531, 0.527, 0.52, 0.518, 0.511, 0.511, 0.511]
              CERESSoilTemperature Temperature
              Organic: FOMCNRatio=33; CarbonUnits=Total
                Thickness  Carbon  SoilCNRatio  FBiom  FInert  FOM
                150        1.04    14.5         0.02   0.36    0
                150        0.79    14.5         0.015  0.5     0
                150        0.71    14.5         0.01   0.59    0
                150        0.52    14.5         0.01   0.84    0
                150        0.29    14.5         0.01   0.8     0
                150        0.3     14.5         0.01   0.99    0
                300        0.23    14.5         0.01   0.99    0
                300        0.23    14.5         0.01   0.99    0
                300        0.23    14.5         0.01   0.99    0
              Chemical: Thickness=[150, 150, 150, 150, 150, 150, 300, 300, 300]; PH=[8, 7.8, 7.8, 7.8, 7.8, 7.8, 7.8, 7.8, 7.8]; PHUnits=Water
              Nutrient
              Physical
                Thickness  BD     AirDry  LL15   DUL   SAT
                150        1.043  0.15    0.16   0.41  0.526
                150        1.063  0.28    0.28   0.5   0.519
                150        1.03   0.3     0.3    0.5   0.531
                150        1.042  0.354   0.354  0.51  0.527
                150        1.06   0.354   0.354  0.5   0.52
                150        1.065  0.354   0.354  0.48  0.518
                300        1.065  0.354   0.354  0.44  0.518
                300        1.084  0.286   0.354  0.44  0.511
                300        1.084  0.286   0.354  0.4   0.511
                SoilCrop MungbeanSoil: LL=[0.16, 0.28, 0.35, 0.354, 0.37, 0.37, 0.37, 0.37, 0.354]; KL=[0.08, 0.08, 0.08, 0.08, 0.08, 0.08, 0.08, 0.08, 0.08]; XF=[1, 1, 1, 1, 1, 1, 1, 1, 1]
              Water: Thickness=[150, 150, 150, 150, 150, 150, 300, 300, 300]; InitialValues=[0.42, 0.42, 0.42, 0.42, 0.4, 0.4, 0.358626, 0.286, 0.286]; RelativeTo=LL15; FilledFromTop=true
              Solute NO3: same as Sim.Factors.Permutation.Site.Emerald.soil.NO3
              Solute NH4: same as Sim.Factors.Permutation.Site.Emerald.soil.NH4
              Solute Urea: same as Sim.Factors.Permutation.Site.Emerald.soil.Urea
          CompositeFactor Goondiwindi (disabled)
            Specifications:
              [Weather]
              [Soil]
            Weather: FileName=Goondiwindi.txt
            Soil: Latitude=0; Longitude=0
              WaterBalance SoilWater: SummerDate=1-Nov; SummerU=6; SummerCona=3.5; WinterDate=1-Apr; WinterU=6; WinterCona=3.5; DiffusConst=88; DiffusSlope=35.4; Salb=0.13; CN2Bare=72; CNRed=20; CNCov=0.8; DischargeWidth=5; CatchmentArea=10; PSIDul=-100; Thickness=[150, 150, 150, 150, 150, 150, 300, 300, 300]; SWCON=[0.3, 0.3, 0.3, 0.3, 0.3, 0.3, 0.3, 0.3, 0.511]
              CERESSoilTemperature Temperature
              Organic: FOMCNRatio=33; CarbonUnits=Total
                Thickness  Carbon  SoilCNRatio  FBiom  FInert  FOM
                150        1.25    14.5         0.02   0.36    0
                150        0.69    14.5         0.015  0.5     0
                150        0.4     14.5         0.01   0.59    0
                150        0.4     14.5         0.01   0.84    0
                150        0.27    14.5         0.01   0.8     0
                150        0.27    14.5         0.01   0.99    0
                300        0.2     14.5         0.01   0.99    0
                300        0.16    14.5         0.01   0.99    0
                300        0.16    14.5         0.01   0.99    0
              Chemical: Thickness=[150, 150, 150, 150, 150, 150, 300, 300, 300]; PH=[8, 7.8, 7.8, 7.8, 7.8, 7.8, 7.8, 7.8, 7.8]; PHUnits=Water
              Nutrient
              Physical
                Thickness  BD     AirDry  LL15   DUL    SAT
                150        1.445  0.024   0.049  0.365  0.415
                150        1.407  0.122   0.152  0.379  0.429
                150        1.341  0.162   0.162  0.404  0.454
                150        1.341  0.162   0.162  0.404  0.454
                150        1.427  0.162   0.162  0.372  0.422
                150        1.407  0.162   0.162  0.372  0.422
                300        1.407  0.162   0.162  0.379  0.429
                300        1.46   0.162   0.162  0.359  0.409
                300        1.478  0.162   0.162  0.352  0.402
                SoilCrop MungbeanSoil
                  LL=[0.049, 0.152, 0.162, 0.162, 0.289, 0.289, 0.337, 0.359, 0.352]
                  KL=[0.06, 0.06, 0.04, 0.04, 0.04, 0.04, 0.04, 0, 0]
                  XF=[1, 1, 1, 1, 1, 1, 1, 1, 1]
              Water: Thickness=[150, 150, 150, 150, 150, 150, 300, 300, 300]; InitialValues=[0.42, 0.42, 0.42, 0.42, 0.4, 0.4, 0.335, 0.33, 0.33]; RelativeTo=Mungbean; FilledFromTop=true
              Solute NO3: Thickness=[150, 150, 150, 150, 150, 150, 300, 300, 300]; InitialValuesUnits=ppm; WaterTableConcentration=0; D0=0; DepthConstant=0; MaxDepthSoluteAccessible=0; RunoffEffectivenessAtMovingSolute=0; MaxEffectiveRunoff=0
                InitialValues=[39.554, 20.3, 14.2, 14.2, 13.352, 13.352, 13.539, 13.044, 12.888]
              Solute NH4: Thickness=[150, 150, 150, 150, 150, 150, 300, 300, 300]; InitialValues=[4.326, 2.22, 1.553, 1.553, 1.46, 1.46, 1.481, 1.427, 1.41]; InitialValuesUnits=ppm; WaterTableConcentration=0; D0=0; DepthConstant=0; MaxDepthSoluteAccessible=0; RunoffEffectivenessAtMovingSolute=0; MaxEffectiveRunoff=0
              Solute Urea: same as Sim.Factors.Permutation.Site.Emerald.soil.Urea
          CompositeFactor Biloela (disabled)
            Specifications:
              [Weather]
              [Soil]
            Weather: FileName=Biloela.txt
            Soil: Latitude=0; Longitude=0
              WaterBalance SoilWater: same as Sim.Factors.Permutation.Site.Goondiwindi.Soil.SoilWater
              CERESSoilTemperature Temperature
              Organic: FOMCNRatio=33; CarbonUnits=Total
                Thickness  Carbon  SoilCNRatio  FBiom  FInert  FOM
                150        0.915   14.5         0.04   0.36    0
                150        0.777   14.5         0.02   0.5     0
                150        0.346   14.5         0.02   0.59    0
                150        0.346   14.5         0.02   0.84    0
                150        0.231   14.5         0.02   0.8     0
                150        0.231   14.5         0.02   0.99    0
                300        0.154   14.5         0.01   0.99    0
                300        0.123   14.5         0.01   0.99    0
                300        0.123   14.5         0.01   0.99    0
              Chemical: Thickness=[150, 150, 150, 150, 150, 150, 300, 300, 300]; PH=[8.2, 8.5, 8.6, 8.6, 8.6, 8.6, 7.4, 5.3, 5.3]; PHUnits=Water
              Nutrient
              Physical
                Thickness  BD    AirDry  LL15  DUL   SAT
                150        1.22  0.08    0.26  0.46  0.51
                150        1.28  0.08    0.26  0.44  0.49
                150        1.28  0.28    0.28  0.44  0.49
                150        1.28  0.28    0.28  0.44  0.49
                150        1.29  0.29    0.29  0.42  0.47
                150        1.29  0.29    0.29  0.42  0.47
                300        1.33  0.32    0.32  0.42  0.47
                300        1.34  0.33    0.33  0.41  0.46
                300        1.34  0.33    0.33  0.41  0.46
                SoilCrop MungbeanSoil: LL=[0.26, 0.26, 0.29, 0.29, 0.35, 0.35, 0.42, 0.41, 0.41]; KL=[0.08, 0.08, 0.08, 0.08, 0.08, 0.08, 0.06, 0.04, 0.04]; XF=[1, 1, 1, 1, 1, 1, 1, 1, 1]
              Water: Thickness=[150, 150, 150, 150, 150, 150, 300, 300, 300]; InitialValues=[0.42, 0.42, 0.42, 0.42, 0.4, 0.4, 0.335, 0.33, 0.33]; RelativeTo=Mungbean; FilledFromTop=true
              Solute NO3: Thickness=[150, 150, 150, 150, 150, 150, 300, 300, 300]; InitialValuesUnits=ppm; WaterTableConcentration=0; D0=0; DepthConstant=0; MaxDepthSoluteAccessible=0; RunoffEffectivenessAtMovingSolute=0; MaxEffectiveRunoff=0
                InitialValues=[12.632, 19.737, 13.158, 13.158, 6.579, 6.579, 6.579, 1.316, 1.316]
              Solute NH4: Thickness=[150, 150, 150, 150, 150, 150, 300, 300, 300]; InitialValues=[5, 1, 1, 1, 1, 1, 1, 1, 1]; InitialValuesUnits=ppm; WaterTableConcentration=0; D0=0; DepthConstant=0; MaxDepthSoluteAccessible=0; RunoffEffectivenessAtMovingSolute=0; MaxEffectiveRunoff=0
              Solute Urea: same as Sim.Factors.Permutation.Site.Emerald.soil.Urea
        Factor IW: Specification=[Soil].Water.FractionFull=0.39,0.58,0.78,0.97
    Simulation Sim
      Summary summaryfile
      SoilArbitrator Soil Arbitrator
      Weather: FileName=Gatton.txt
      Clock: Start=1960-01-01; End=2022-08-10
      Zone paddock: Area=1; Slope=0; AspectAngle=0; Altitude=50
        Fertiliser
        SurfaceOrganicMatter: InitialResidueName=wheat; InitialResidueType=wheat; InitialResidueMass=500; InitialStandingFraction=0; InitialCPR=0; InitialCNR=40
        Manager HarvestRule
```csharp
using Models.PMF.Phen;
using APSIM.Shared.Utilities;
using System.Xml.Serialization;
using Models;
using Models.PMF;
using Models.Soils;
using System.Text;
using System.Collections.Generic;
using Models.Core;
using System;
using Models.Soils.Nutrients;

namespace Models
{
    [Serializable] 
    public class Script : Model
    {      
        [Link] private Plant Mungbean;
        [Link] private Zone zone;
        [Link(Type = LinkType.Path, Path = "[Mungbean].Phenology")]
        private Phenology phenology;
                    
        
        [EventSubscribe("StartOfSimulation")]
        private void OnSimulationCommencing(object sender, EventArgs e)
        {
        }       
        
        [EventSubscribe("DoManagement")]
        private void OnDoManagement(object sender, EventArgs e)
        {
        if (phenology.CurrentPhase.Name=="ReadyForHarvesting")
           {
           Mungbean.Harvest();
           Mungbean.EndCrop();
           }
        }
        
        [EventSubscribe("DoManagementCalculations")]
        private void OnDoManagementCalculations(object sender, EventArgs e)
        {
            
        }
    }
}
```
        Report HarvestReport: EventNames=[Soybean].Harvesting
          VariableNames:
            [Clock].Today
            [Mungbean].Phenology.Stage
            [Mungbean].Phenology.CurrentStageName
            [Mungbean].AboveGround.Wt
            [Mungbean].AboveGround.N
            [Mungbean].Grain.Total.Wt*10 as Yield
            [Mungbean].Grain.NConc
            [Mungbean].Grain.Size
            [Mungbean].Grain.Number
            [Mungbean].Grain.Total.Wt
            [Mungbean].Grain.Total.N
            [Mungbean].Total.Wt
            [Soil].InitialWater.PAW
        MicroClimate: a_interception=0; b_interception=1; c_interception=0; d_interception=0; SoilHeatFluxFraction=0.4; MinimumHeightDiffForNewLayer=0; NightInterceptionFraction=0.5; ReferenceHeight=2
        Soil: SoilType=APS6Soil; LocalName=APS6Site; Site=APS6Site; NearestTown=Unknown; Region=Lawes; NaturalVegetation=Unknown; Latitude=0; Longitude=0
          WaterBalance SoilWater: SummerDate=1-Nov; SummerU=6; SummerCona=3.5; WinterDate=1-Apr; WinterU=6; WinterCona=3.5; DiffusConst=88; DiffusSlope=35.4; Salb=0.13; CN2Bare=60; CNRed=20; CNCov=0.8; DischargeWidth=0; CatchmentArea=0; PSIDul=-100
            Thickness  SWCON  KLAT
            150        0.48   0
            150        0.48   0
            150        0.48   0
            150        0.38   0
            150        0.38   0
            150        0.38   0
            300        0.33   0
            300        0.35   0
            300        0.35   0
          Organic: same as Sim.Factors.Permutation.Site.Gatton.Soil.Organic
          Chemical: Thickness=[150, 150, 150, 150, 150, 150, 300, 300, 300]; PH=[7.5, 8, 8, 8, 8, 8, 8, 8, 8]; PHUnits=Water
          CERESSoilTemperature Temperature
          Nutrient
          Physical
            Thickness  BD    AirDry  LL15  DUL   SAT
            150        1.38  0.1     0.22  0.48  0.48
            150        1.34  0.19    0.22  0.48  0.48
            150        1.35  0.24    0.24  0.48  0.48
            150        1.35  0.24    0.24  0.38  0.42
            150        1.5   0.26    0.26  0.38  0.42
            150        1.5   0.26    0.26  0.38  0.42
            300        1.49  0.26    0.26  0.33  0.42
            300        1.46  0.27    0.27  0.35  0.42
            300        1.46  0.27    0.27  0.35  0.42
            SoilCrop MungbeanSoil: LL=[0.3, 0.3, 0.3, 0.32, 0.32, 0.32, 0.32, 0.32, 0.32]; KL=[0.04, 0.04, 0.04, 0.08, 0.08, 0.08, 0.08, 0.04, 0.04]; XF=[1, 1, 1, 1, 1, 1, 1, 1, 1]
          Water: Thickness=[150, 150, 150, 150, 150, 150, 300, 300, 300]; InitialValues=[0.48, 0.48, 0.48, 0.38, 0.38, 0.38, 0.33, 0.35, 0.337]; RelativeTo=Mungbean; FilledFromTop=true
          Solute NO3: Thickness=[150, 150, 150, 150, 150, 150, 300, 300, 300]; InitialValues=[20, 20, 20, 3, 2, 2, 1, 0.1, 0.1]; InitialValuesUnits=ppm; WaterTableConcentration=0; D0=0; DepthConstant=0; MaxDepthSoluteAccessible=0; RunoffEffectivenessAtMovingSolute=0; MaxEffectiveRunoff=0
          Solute NH4: Thickness=[150, 150, 150, 150, 150, 150, 300, 300, 300]; InitialValues=[20, 20, 20, 1, 0.8, 0.8, 0.8, 0.5, 0.5]; InitialValuesUnits=ppm; WaterTableConcentration=0; D0=0; DepthConstant=0; MaxDepthSoluteAccessible=0; RunoffEffectivenessAtMovingSolute=0; MaxEffectiveRunoff=0
          Solute Urea: same as Sim.Factors.Permutation.Site.Gatton.Soil.Urea
        Manager SowingRule
          Crop = [Mungbean]
          EachYear = True
          FirstSowDate = 1-sep
          numdays = 0
          CultivarName = Jade
          SowingDepth = 50
          RowSpacing = 500
          Population = 30
```csharp
using APSIM.Shared.Utilities;
using Models.Utilities;
using Models.Soils;
using Models.PMF;
using Models.Core;
using System;

namespace Models
{
    [Serializable]
    public class Script : Model
    {
        [Link] Clock Clock;
        [Link] Fertiliser Fertiliser;
        [Link] Summary Summary;
        [Link] Soil Soil;
        
        [Description("Crop")]
        public IPlant Crop { get; set; }
        
        [Description("Sow on the same day(s) each year?")]
        public bool EachYear { get; set; }

        [Description("First Sowing date (d-mmm)")]
        public string FirstSowDate { get; set; } 
        
        [Description ("Factorial Days After First Sowing Date")]
        public int numdays {get; set;}

       private DateTime SowDate;
       
       private int StartYear;

        [Display(Type = DisplayType.CultivarName)]
        [Description("Cultivar to be sown")]
        public string CultivarName { get; set; }

        [Description("Sowing depth (mm)")]
        public double SowingDepth { get; set; }

        [Description("Row spacing (mm)")]
        public double RowSpacing { get; set; }

        [Description("Plant population (/m2)")]
        public double Population { get; set; }

            
        //Sow on incremental dates
       [EventSubscribe("DoManagement")]
        private void OnDoManagement(object sender, EventArgs e)
        {
        if (Clock.Today.Month==9)
        	StartYear=Clock.Today.Year;
        	
           SowDate = DateTime.Parse(FirstSowDate + "-" + StartYear.ToString());
            SowDate= SowDate.AddDays(numdays);
            if (Clock.Today==SowDate)
       
            {
                Crop.Sow(population: Population, cultivar: CultivarName, depth: SowingDepth, rowSpacing: RowSpacing);    
            }
        }
    }
}
```
        Manager Reset on sowing
          ResetWater = Yes
          ResetNutrients = Yes
          ResetSOM = Yes
```csharp
using Models.Soils.Nutrients;
using APSIM.Shared.Utilities;
using Models.Surface;
using Models.Utilities;
using Models.Soils.Nutrients;
using Models.Soils;
using Models.PMF;
using Models.Core;
using System;
using Models.Interfaces;

namespace Models
{
    [Serializable]
    public class Script : Model
    {
        [Link] private Plant Mungbean;
        [Link] private ISoilWater SoilWater;
        [Link] private Nutrient nutrient;
        [Link] private SurfaceOrganicMatter SOM;
        [Link] private Summary Summary;

        [Description("Reset Water? (Yes or No)")]
        public string ResetWater {get;set;}

        [Description("Reset Soil Nutrients? (Yes or No)")]
        public string ResetNutrients {get;set;}

        [Description("Reset Surface Organic Matter? (Yes or No)")]
        public string ResetSOM {get;set;}

        [EventSubscribe("Sowing")]
        private void OnSowing(object sender, EventArgs e)
        {
            if (ResetWater == "Yes")
            {
                Summary.WriteMessage(this, "Reset Water", MessageType.Diagnostic);
                SoilWater.Reset();
            }
            if (ResetNutrients == "Yes")
            {
                Summary.WriteMessage(this, "Reset Nutrients", MessageType.Diagnostic);
                nutrient.Reset();
            }
            if (ResetSOM == "Yes")
            {
                Summary.WriteMessage(this, "Reset Surface OM", MessageType.Diagnostic);
                SOM.Reset();
            }
        }
    }
}
```
        Irrigation
        Manager Calculations
```csharp
using Models.PMF.Phen;
using APSIM.Shared.Utilities;
using System.Xml.Serialization;
using Models;
using Models.Utilities;
using Models.PMF;
using Models.Soils;
using System.Text;
using System.Collections.Generic;
using Models.Core;
using System;
using Models.Climate;


namespace Models
{
    [Serializable] 
    public class Script : Model
    {      
        [Link] private Plant Mungbean;
        [Link] private Zone zone;
        [Link] Weather weather;
        [Link] ISummary summary = null;
        [Link(Type = LinkType.Path, Path = "[Mungbean].Phenology")]
        private Phenology phenology;
 
        public double FlotoMidGFCumRain {get; set;} = 0;
        public double FlotoMidGFDays {get; set;}=0;
        public double FlotoMidGFCumRad {get; set;} = 0;
        public double FlotoMidGFCumMinT {get; set;} = 0;
        public double FlotoMidGFCumMaxT {get; set;} = 0;
        public double FlotoMidGFCumVPD {get; set;} = 0;
        public double FlotoMidGFAvgRad {get; set;}
        public double FlotoMidGFAvgMinT {get; set;}
        public double FlotoMidGFAvgMaxT {get; set;}
        public double FlotoMidGFAvgVPD {get; set;}
        
        public double FlotoLateGFCumRain {get; set;} = 0;
        public double FlotoLateGFDays {get; set;}=0;
        public double FlotoLateGFCumRad {get; set;} = 0;
        public double FlotoLateGFCumMinT {get; set;} = 0;
        public double FlotoLateGFCumMaxT {get; set;} = 0;
        public double FlotoLateGFCumVPD {get; set;} = 0;
        public double FlotoLateGFAvgRad {get; set;}
        public double FlotoLateGFAvgMinT {get; set;}
        public double FlotoLateGFAvgMaxT {get; set;}
        public double FlotoLateGFAvgVPD {get; set;}
        
        
        public double SeasonRain {get;set;} = 0;
        public double SeasonET {get;set;} = 0;
        public double SeasonAridity {get;set;}
        
        public double SummerRain {get;set;} = 0;
        public double SummerET {get;set;} = 0;
        public double SummerAridity {get;set;}
        
        public double VegMinT {get;set;}
        public double VegMaxT {get;set;}

        
      [EventSubscribe("DoManagement")] 
        private void OnDoManagement(object sender, EventArgs e)
        {
         double stage = (double)Mungbean.FindByPath("Phenology.Stage").Value; 
 
        if (stage >=4 && stage<=7)
        {    
        	FlotoMidGFDays +=1;
        	FlotoMidGFCumRain += weather.Rain;
        	FlotoMidGFCumRad += weather.Radn;
        	FlotoMidGFAvgRad = FlotoMidGFCumRad/FlotoMidGFDays;
        	FlotoMidGFCumMinT += weather.MinT;
        	FlotoMidGFAvgMinT = FlotoMidGFCumMinT/FlotoMidGFDays;       
        	FlotoMidGFCumMaxT += weather.MaxT;
        	FlotoMidGFAvgMaxT = FlotoMidGFCumMaxT/FlotoMidGFDays;
        	FlotoMidGFCumVPD += weather.VPD;
        	FlotoMidGFAvgVPD = FlotoMidGFCumVPD/FlotoMidGFDays;         
    	}
    
        if (stage >=4 && stage<=8)
        {    
        	FlotoLateGFDays +=1;
        	FlotoLateGFCumRain += weather.Rain;
        	FlotoLateGFCumRad += weather.Radn;
        	FlotoLateGFAvgRad = FlotoLateGFCumRad/FlotoLateGFDays;
        	FlotoLateGFCumMinT += weather.MinT;
        	FlotoLateGFAvgMinT = FlotoLateGFCumMinT/FlotoLateGFDays;       
        	FlotoLateGFCumMaxT += weather.MaxT;
        	FlotoLateGFAvgMaxT = FlotoLateGFCumMaxT/FlotoLateGFDays;
        	FlotoLateGFCumVPD += weather.VPD;
        	FlotoLateGFAvgVPD = FlotoLateGFCumVPD/FlotoLateGFDays;
    	}


			    
    
}
}
}
```
        Report MungbeanWaterReport: EventNames=[Clock].DoReport
          VariableNames:
            [Clock].Today
            [Mungbean].Grain.Total.Wt*10 as Yield
            [Mungbean].AboveGround.Wt*10 as Biomass
            [Mungbean].SowingDate
            [Mungbean].Leaf.Fn
            [Mungbean].Leaf.Fw
        Plant Mungbean
        Plant Wheat
        Manager Sow on a fixed date
          Crop = [Wheat]
          SowDate = 01-may
          CultivarName = Gregory
          SowingDepth = 50
          RowSpacing = 750
          Population = 6
```csharp
using APSIM.Shared.Utilities;
using Models.Utilities;
using Models.Soils;
using Models.PMF;
using Models.Core;
using System;

namespace Models
{
    [Serializable]
    public class Script : Model
    {
        [Link] Clock Clock;
        [Link] Fertiliser Fertiliser;
        [Link] Summary Summary;
        [Link] Soil Soil;
        
        [Description("Crop")]
        public IPlant Crop { get; set; }

        [Description("Sowing date (d-mmm)")]
        public string SowDate { get; set; }

        [Display(Type = DisplayType.CultivarName)]
        [Description("Cultivar to be sown")]
        public string CultivarName { get; set; }

        [Description("Sowing depth (mm)")]
        public double SowingDepth { get; set; }

        [Description("Row spacing (mm)")]
        public double RowSpacing { get; set; }

        [Description("Plant population (/m2)")]
        public double Population { get; set; }

        [EventSubscribe("DoManagement")]
        private void OnDoManagement(object sender, EventArgs e)
        {
            if (DateUtilities.WithinDates(SowDate, Clock.Today, SowDate))
            {
                Crop.Sow(population: Population, cultivar: CultivarName, depth: SowingDepth, rowSpacing: RowSpacing);    
            }
            
        }
    }
}
```
    Folder Box Plot
    Folder
  Experiment Fallow
    Factors
      Permutation
        Factor Site
          CompositeFactor Gatton
            Specifications:
              [Weather]
              [Soil]
            Weather: FileName=Gatton.txt
            Soil: SoilType=APS6Soil; LocalName=APS6Site; Site=APS6Site; NearestTown=Unknown; Region=Lawes; NaturalVegetation=Unknown; Latitude=0; Longitude=0
              WaterBalance SoilWater: same as Sim.Factors.Permutation.Site.Gatton.Soil.SoilWater
              Organic: same as Sim.Factors.Permutation.Site.Gatton.Soil.Organic
              Chemical: Thickness=[150, 150, 150, 150, 150, 150, 300, 300, 300]; PH=[7.5, 8, 8, 8, 8, 8, 8, 8, 8]; PHUnits=Water
              CERESSoilTemperature Temperature
              Nutrient
              Physical
                Thickness  BD    AirDry  LL15   DUL   SAT
                150        1.38  0.2     0.208  0.42  0.45
                150        1.34  0.273   0.273  0.42  0.45
                150        1.35  0.286   0.286  0.42  0.45
                150        1.35  0.286   0.286  0.42  0.45
                150        1.5   0.286   0.286  0.4   0.43
                150        1.5   0.286   0.286  0.4   0.43
                300        1.49  0.286   0.286  0.36  0.4
                300        1.46  0.286   0.286  0.36  0.4
                300        1.46  0.286   0.286  0.36  0.4
                SoilCrop WheatSoil: LL=[0.3, 0.3, 0.3, 0.32, 0.32, 0.32, 0.32, 0.32, 0.32]; KL=[0.04, 0.04, 0.04, 0.08, 0.08, 0.08, 0.08, 0.04, 0.04]; XF=[1, 1, 1, 1, 1, 1, 1, 1, 1]
              Water: Thickness=[150, 150, 150, 150, 150, 150, 300, 300, 300]; InitialValues=[0.3, 0.3, 0.3, 0.3, 0.3, 0.3, 0.3, 0.3, 0.3]; RelativeTo=LL15; FilledFromTop=true
              Solute NO3: same as Sim.Factors.Permutation.Site.Gatton.Soil.NO3
              Solute NH4: same as Sim.Factors.Permutation.Site.Gatton.Soil.NH4
              Solute Urea: same as Sim.Factors.Permutation.Site.Gatton.Soil.Urea
          CompositeFactor Emerald (disabled): same as Sim.Factors.Permutation.Site.Emerald
          CompositeFactor Pampas (disabled): same as Sim.Factors.Permutation.Site.Pampas
          CompositeFactor Narrabri (disabled): same as Sim.Factors.Permutation.Site.Narrabri
          CompositeFactor Breeza (disabled): same as Sim.Factors.Permutation.Site.Breeza
          CompositeFactor Goondiwindi (disabled): same as Sim.Factors.Permutation.Site.Goondiwindi
          CompositeFactor Biloela (disabled): same as Sim.Factors.Permutation.Site.Biloela
        Factor Sow: Specification=[ResetingRule].Script.numdays= 0 to 180 step 1
    Simulation Fallow
      Summary summaryfile
      SoilArbitrator Soil Arbitrator
      Weather: FileName=Gatton.txt
      Clock: Start=1960-01-01; End=2022-08-10
      Zone paddock: Area=1; Slope=0; AspectAngle=0; Altitude=50
        Fertiliser
        SurfaceOrganicMatter: InitialResidueName=wheat; InitialResidueType=wheat; InitialResidueMass=500; InitialStandingFraction=0; InitialCPR=0; InitialCNR=40
        MicroClimate: a_interception=0; b_interception=1; c_interception=0; d_interception=0; SoilHeatFluxFraction=0.4; MinimumHeightDiffForNewLayer=0; NightInterceptionFraction=0.5; ReferenceHeight=2
        Soil: SoilType=APS6Soil; LocalName=APS6Site; Site=APS6Site; NearestTown=Unknown; Region=Lawes; NaturalVegetation=Unknown; Latitude=0; Longitude=0
          WaterBalance SoilWater: same as Sim.Sim.paddock.Soil.SoilWater
          Organic: FOMCNRatio=60; CarbonUnits=Total
            Thickness  Carbon  SoilCNRatio  FBiom  FInert  FOM
            150        2.08    14.5         0.03   0.45    34.713
            150        1.21    14.5         0.02   0.6     27.034
            150        1.21    14.5         0.01   0.78    16.397
            150        1.15    14.5         0.01   0.78    16.397
            150        1       14.5         0.01   0.9     9.945
            150        1       14.5         0.01   0.9     9.945
            300        0.8     14.5         0.01   0.99    6.032
            300        0.45    14.5         0.01   0.99    3.659
            300        0.45    14.5         0.01   0.99    2.219
          Chemical: Thickness=[150, 150, 150, 150, 150, 150, 300, 300, 300]; PH=[7.5, 8, 8, 8, 8, 8, 8, 8, 8]; PHUnits=Water
          CERESSoilTemperature Temperature
          Nutrient
          Physical
            Thickness  BD    AirDry  LL15  DUL   SAT
            150        1.38  0.1     0.22  0.48  0.48
            150        1.34  0.19    0.22  0.48  0.48
            150        1.35  0.24    0.24  0.48  0.48
            150        1.35  0.24    0.24  0.38  0.42
            150        1.5   0.26    0.26  0.38  0.42
            150        1.5   0.26    0.26  0.38  0.42
            300        1.49  0.26    0.26  0.33  0.42
            300        1.46  0.27    0.27  0.35  0.42
            300        1.46  0.27    0.27  0.35  0.42
            SoilCrop MungbeanSoil: LL=[0.3, 0.3, 0.3, 0.32, 0.32, 0.32, 0.32, 0.32, 0.32]; KL=[0.04, 0.04, 0.04, 0.08, 0.08, 0.08, 0.08, 0.04, 0.04]; XF=[1, 1, 1, 1, 1, 1, 1, 1, 1]
            SoilCrop WheatSoil: LL=[0.3, 0.3, 0.3, 0.32, 0.32, 0.32, 0.32, 0.32, 0.32]; KL=[0.04, 0.04, 0.04, 0.08, 0.08, 0.08, 0.08, 0.04, 0.04]; XF=[1, 1, 1, 1, 1, 1, 1, 1, 1]
          Water: Thickness=[150, 150, 150, 150, 150, 150, 300, 300, 300]; InitialValues=[0.48, 0.48, 0.48, 0.38, 0.38, 0.38, 0.33, 0.328, 0.32]; RelativeTo=LL15; FilledFromTop=true
          Solute NO3: same as Sim.Sim.paddock.Soil.NO3
          Solute NH4: same as Sim.Sim.paddock.Soil.NH4
          Solute Urea: same as Sim.Factors.Permutation.Site.Gatton.Soil.Urea
        Irrigation
        Manager ResetingRule
          ResetWater = Yes
          EachYear = True
          FirstResetDate = 1-Sep
          numdays = 0
          ResetNutrients = Yes
          ResetSOM = Yes
```csharp
using Models.Soils.Nutrients;
using APSIM.Shared.Utilities;
using Models.Surface;
using Models.Utilities;
using Models.Soils.Nutrients;
using Models.Soils;
using Models.PMF;
using Models.Core;
using System;
using Models.Interfaces;

namespace Models
{
    [Serializable]
    public class Script : Model
    {
        [Link] private Clock Clock;
        [Link] private ISoilWater SoilWater;
        [Link] private Nutrient nutrient;
        [Link] private SurfaceOrganicMatter SOM;
        [Link] private Summary Summary;
        [Link] public IPlant wheat;

        [Description("Reset Water? (Yes or No)")]
        public string ResetWater {get;set;}
        
        [Description("Reset on the same day(s) each year?")]
        public bool EachYear { get; set; }

        [Description("First Reset date (d-mmm)")]
        public string FirstResetDate { get; set; } 
        
        [Description ("Factorial Days After First Resetting Date")]
        public int numdays {get; set;}
        

       private DateTime ResetDate;
       
       private int StartYear;     
  
       public double Evaporation {get;set;} = 0;

        [Description("Reset Soil Nutrients ? (Yes or No)")]
        public string ResetNutrients {get;set;}

        [Description("Reset Surface Organic Matter? (Yes or No)")]
        public string ResetSOM {get;set;}

        [EventSubscribe("DoManagement")]
        private void OnDoManagement(object sender, EventArgs e)
        {
        if (Clock.Today.Month==9)
        	StartYear=Clock.Today.Year;
        	
            ResetDate = DateTime.Parse(FirstResetDate + "-" + StartYear.ToString());
            ResetDate= ResetDate.AddDays(numdays);
                if (Clock.Today==ResetDate && ResetWater == "Yes")
                {
                    Summary.WriteMessage(this, "Reset Water", MessageType.Diagnostic);
                    SoilWater.Reset();
                }
                if (Clock.Today==ResetDate && ResetNutrients == "Yes")
                {
                    Summary.WriteMessage(this, "Reset Nitrogen", MessageType.Diagnostic);
                    nutrient.Reset();
                }
                if (Clock.Today==ResetDate && ResetSOM == "Yes")
                {
                    Summary.WriteMessage(this, "Reset Surface OM", MessageType.Diagnostic);
                    SOM.Reset();
                }
                
             	if (Clock.Today == ResetDate)
             	{
             		Evaporation = 0;
             	}
             	
                if (Clock.Today>ResetDate)
                {
					Summary.WriteMessage(this, "it worked", MessageType.Diagnostic);
					Evaporation += SoilWater.Eos;
                }
            }
        }
    }
```
        Report FallowWaterReport: EventNames=[Clock].EndOfYear
        Manager Sow on a fixed date: same as Sim.Sim.paddock.Sow on a fixed date
        Plant Wheat
    Folder Box Plot
    Folder
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